Clear

New Circuit.ucsdMicrogrid_Reduced bus1=SDG&E_69KV basekv=69 pu=1 angle=0 frequency=60 MVAsc3=20000 MVAsc1=20000 x1r1=8.6 x0r0=8.9 BaseFreq=60
New Line.e_1_9_1_11_e_1_9_11 Phases=3 bus1=e_1_9_1_11.1.2.3 bus2=e_1_9_11.1.2.3 Units=km Length=0.012192 Rmatrix=[0.0710846666667    0.0120296666667    0.0120296666667| 0.0120296666667    0.0710846666667    0.0120296666667| 0.0120296666667    0.0120296666667    0.0710846666667|] Xmatrix=[ 0.138888666667    0.0503056666667    0.0503056666667| 0.0503056666667     0.138888666667    0.0503056666667| 0.0503056666667    0.0503056666667     0.138888666667|] Cmatrix=[0                  0                  0| 0                  0                  0| 0                  0                  0|]
New Line.e_1_9_1_11_bus_t_136_pri Phases=3 bus1=e_1_9_1_11.1.2.3 bus2=bus_t_136_pri.1.2.3 Units=km Length=0.03048 Rmatrix=[0.0710846666656    0.0120296666664    0.0120296666664| 0.0120296666664    0.0710846666656    0.0120296666664| 0.0120296666664    0.0120296666664    0.0710846666656|] Xmatrix=[ 0.138888666666    0.0503056666662    0.0503056666662| 0.0503056666662     0.138888666666    0.0503056666662| 0.0503056666662    0.0503056666662     0.138888666666|] Cmatrix=[0                  0                  0| 0                  0                  0| 0                  0                  0|]
New Line.mcss_ma_t_050 Phases=3 bus1=mcss_ma.1.2.3 bus2=t_050.1.2.3 Units=km Length=0.7165848 Rmatrix=[0.0625778080889    0.0106119048049    0.0106119048049| 0.0106119048049    0.0625778080888    0.0106119048049| 0.0106119048049    0.0106119048049    0.0625778080889|] Xmatrix=[ 0.133218195611    0.0474710073064    0.0474710073064| 0.0474710073064     0.133218195611    0.0474710073064| 0.0474710073064    0.0474710073064     0.133218195611|] Cmatrix=[0                  0                  0| 0                  0                  0| 0                  0                  0|]
New Line.mcss_ma_t_305_pri Phases=3 bus1=mcss_ma.1.2.3 bus2=t_305_pri.1.2.3 Units=km Length=0.633984 Rmatrix=[ 0.0554694254147   0.00942721452752   0.00942721452752| 0.00942721452752    0.0554694254147   0.00942721452752| 0.00942721452752   0.00942721452752    0.0554694254147|] Xmatrix=[ 0.128479915845    0.0451023489367    0.0451023489367| 0.0451023489367     0.128479915845    0.0451023489367| 0.0451023489367    0.0451023489367     0.128479915845|] Cmatrix=[0                  0                  0| 0                  0                  0| 0                  0                  0|]
New Line.mcss_mc_e_5_5_436 Phases=3 bus1=mcss_mc.1.2.3 bus2=e_5_5_436.1.2.3 Units=km Length=0.233172 Rmatrix=[0.0710846665307    0.0120296666314    0.0120296666314| 0.0120296666314    0.0710846665307    0.0120296666314| 0.0120296666314    0.0120296666314    0.0710846665307|] Xmatrix=[ 0.138888666566    0.0503056666077    0.0503056666077| 0.0503056666077     0.138888666566    0.0503056666077| 0.0503056666077    0.0503056666077     0.138888666566|] Cmatrix=[0                  0                  0| 0                  0                  0| 0                  0                  0|]
New Line.east_campus_1_revelle_1 Phases=3 bus1=east_campus_1.1.2.3 bus2=revelle_1.1.2.3 Units=km Length=2.479548 Rmatrix=[0.0710846482301    0.0120296618873    0.0120296618873| 0.0120296618873      0.07108464823    0.0120296618873| 0.0120296618873    0.0120296618873    0.0710846482303|] Xmatrix=[ 0.138888652981    0.0503056586719    0.0503056586719| 0.0503056586719     0.138888652981    0.0503056586719| 0.0503056586719    0.0503056586719     0.138888652981|] Cmatrix=[0                  0                  0| 0                  0                  0| 0                  0                  0|]
New Line.east_campus_1_e_7_1_7 Phases=3 bus1=east_campus_1.1.2.3 bus2=e_7_1_7.1.2.3 Units=km Length=0.021336 Rmatrix=[0.0710846666667    0.0120296666667    0.0120296666667| 0.0120296666667    0.0710846666666    0.0120296666667| 0.0120296666667    0.0120296666667    0.0710846666667|] Xmatrix=[ 0.138888666667    0.0503056666667    0.0503056666667| 0.0503056666667     0.138888666667    0.0503056666667| 0.0503056666667    0.0503056666667     0.138888666667|] Cmatrix=[0                  0                  0| 0                  0                  0| 0                  0                  0|]
New Line.east_campus_1_mcss_ma Phases=3 bus1=east_campus_1.1.2.3 bus2=mcss_ma.1.2.3 Units=km Length=0.4227576 Rmatrix=[ 0.0513999996692   0.00874899991875   0.00874899991875| 0.00874899991875    0.0513999996692   0.00874899991875| 0.00874899991875   0.00874899991875    0.0513999996692|] Xmatrix=[ 0.125767332989    0.0437463331638    0.0437463331638| 0.0437463331638     0.125767332989    0.0437463331638| 0.0437463331638    0.0437463331638     0.125767332989|] Cmatrix=[0                  0                  0| 0                  0                  0| 0                  0                  0|]
New Line.east_campus_1_n_campus_a Phases=3 bus1=east_campus_1.1.2.3 bus2=n_campus_a.1.2.3 Units=km Length=1.435608 Rmatrix=[ 0.071084660506    0.0120296650663    0.0120296650665| 0.0120296650663     0.071084660511    0.0120296650667| 0.0120296650665    0.0120296650667    0.0710846605114|] Xmatrix=[ 0.138888662085    0.0503056639909    0.0503056639907| 0.0503056639909     0.138888662101    0.0503056639905| 0.0503056639907    0.0503056639905     0.138888662073|] Cmatrix=[0                  0                  0| 0                  0                  0| 0                  0                  0|]
New Line.psb_sg1_bus Phases=3 bus1=psb.1.2.3 bus2=sg1_bus.1.2.3 Units=km Length=0.085344 Rmatrix=[0.0710846666664    0.0120296666667    0.0120296666666| 0.0120296666667    0.0710846666667    0.0120296666667| 0.0120296666666    0.0120296666667    0.0710846666665|] Xmatrix=[ 0.138888666667    0.0503056666668    0.0503056666666| 0.0503056666668     0.138888666667    0.0503056666664| 0.0503056666666    0.0503056666664     0.138888666667|] Cmatrix=[0                  0                  0| 0                  0                  0| 0                  0                  0|]
New Line.psb_bus_t_234_pri Phases=3 bus1=psb.1.2.3 bus2=bus_t_234_pri.1.2.3 Units=km Length=0.108204 Rmatrix=[0.0710846666383    0.0120296666589     0.012029666659| 0.0120296666589    0.0710846666374    0.0120296666589|  0.012029666659    0.0120296666589    0.0710846666381|] Xmatrix=[ 0.138888666646    0.0503056666541    0.0503056666542| 0.0503056666541     0.138888666645    0.0503056666538| 0.0503056666542    0.0503056666538     0.138888666645|] Cmatrix=[0                  0                  0| 0                  0                  0| 0                  0                  0|]
New Line.psb_psb_line_tg_2 Phases=3 bus1=psb.1.2.3 bus2=psb_line_tg_2.1.2.3 Units=km Length=0.0003048 Rmatrix=[ 0.071084666667    0.0120296666668    0.0120296666667| 0.0120296666668    0.0710846666665    0.0120296666667| 0.0120296666667    0.0120296666667    0.0710846666665|] Xmatrix=[ 0.138888666667    0.0503056666667    0.0503056666669| 0.0503056666667     0.138888666667    0.0503056666665| 0.0503056666669    0.0503056666665     0.138888666665|] Cmatrix=[0                  0                  0| 0                  0                  0| 0                  0                  0|]
New Line.ss_64_sio_bus_t_223_pri Phases=3 bus1=ss_64_sio.1.2.3 bus2=bus_t_223_pri.1.2.3 Units=km Length=0.0762 Rmatrix=[0.16076            0.02625            0.02625| 0.02625            0.16076            0.02625| 0.02625            0.02625            0.16076|] Xmatrix=[ 0.14873           0.050305           0.050305| 0.050305            0.14873           0.050305| 0.050305           0.050305            0.14873|] Cmatrix=[0                  0                  0| 0                  0                  0| 0                  0                  0|]
New Line.ss_64_sio_bus_t_349_pri Phases=3 bus1=ss_64_sio.1.2.3 bus2=bus_t_349_pri.1.2.3 Units=km Length=0.0762 Rmatrix=[0.16076            0.02625            0.02625| 0.02625            0.16076            0.02625| 0.02625            0.02625            0.16076|] Xmatrix=[ 0.14873           0.050305           0.050305| 0.050305            0.14873           0.050305| 0.050305           0.050305            0.14873|] Cmatrix=[0                  0                  0| 0                  0                  0| 0                  0                  0|]
New Line.bldg_3b_12kv_sw_t_301/302 Phases=3 bus1=bldg_3b_12kv.1.2.3 bus2=sw_t_301/302.1.2.3 Units=km Length=0.016764 Rmatrix=[0.0656166666667    0.0416666666667    0.0416666666667| 0.0416666666667    0.0656166666667    0.0416666666667| 0.0416666666667    0.0416666666667    0.0656166666667|] Xmatrix=[0.319333333333     0.188103333333     0.188103333333| 0.188103333333     0.319333333333     0.188103333333| 0.188103333333     0.188103333333     0.319333333333|] Cmatrix=[0                  0                  0| 0                  0                  0| 0                  0                  0|]
New Line.n_campus_b_e_7_17_17 Phases=3 bus1=n_campus_b.1.2.3 bus2=e_7_17_17.1.2.3 Units=km Length=0.7598664 Rmatrix=[0.0710846639315    0.0120296659572    0.0120296659572| 0.0120296659572    0.0710846639315    0.0120296659571| 0.0120296659572    0.0120296659571    0.0710846639315|] Xmatrix=[ 0.138888664636    0.0503056654802    0.0503056654802| 0.0503056654802     0.138888664636    0.0503056654802| 0.0503056654802    0.0503056654802     0.138888664636|] Cmatrix=[0                  0                  0| 0                  0                  0| 0                  0                  0|]
New Line.n_campus_b_t_281_pri Phases=3 bus1=n_campus_b.1.2.3 bus2=t_281_pri.1.2.3 Units=km Length=0.963168 Rmatrix=[0.0710846631697    0.0120296657604    0.0120296657604| 0.0120296657604    0.0710846631697    0.0120296657604| 0.0120296657604    0.0120296657604    0.0710846631697|] Xmatrix=[ 0.138888664071    0.0503056651505    0.0503056651505| 0.0503056651505     0.138888664071    0.0503056651505| 0.0503056651505    0.0503056651505     0.138888664071|] Cmatrix=[0                  0                  0| 0                  0                  0| 0                  0                  0|]
New Line.n_campus_b_e_1_9_8 Phases=3 bus1=n_campus_b.1.2.3 bus2=e_1_9_8.1.2.3 Units=km Length=0.445008 Rmatrix=[0.0710846660917    0.0120296665176    0.0120296665176| 0.0120296665176    0.0710846660917    0.0120296665176| 0.0120296665176    0.0120296665176    0.0710846660917|] Xmatrix=[  0.13888866624    0.0503056664173    0.0503056664173| 0.0503056664173      0.13888866624    0.0503056664173| 0.0503056664173    0.0503056664173      0.13888866624|] Cmatrix=[0                  0                  0| 0                  0                  0| 0                  0                  0|]
New Line.n_campus_b_ss_92_erc Phases=3 bus1=n_campus_b.1.2.3 bus2=ss_92_erc.1.2.3 Units=km Length=0.915924 Rmatrix=[0.0710846641726    0.0120296660201    0.0120296660201| 0.0120296660201    0.0710846641726    0.0120296660201| 0.0120296660201    0.0120296660201    0.0710846641726|] Xmatrix=[ 0.138888664815    0.0503056655852    0.0503056655852| 0.0503056655852     0.138888664815    0.0503056655852| 0.0503056655852    0.0503056655852     0.138888664815|] Cmatrix=[0                  0                  0| 0                  0                  0| 0                  0                  0|]
New Line.n_campus_b_bus_t_284_pri Phases=3 bus1=n_campus_b.1.2.3 bus2=bus_t_284_pri.1.2.3 Units=km Length=1.345692 Rmatrix=[0.0710846600585    0.0120296649526    0.0120296649526| 0.0120296649526    0.0710846600585    0.0120296649526| 0.0120296649526    0.0120296649526    0.0710846600585|] Xmatrix=[ 0.138888661761    0.0503056638003    0.0503056638003| 0.0503056638003     0.138888661761    0.0503056638003| 0.0503056638003    0.0503056638003     0.138888661761|] Cmatrix=[0                  0                  0| 0                  0                  0| 0                  0                  0|]
New Line.n_campus_c_e_7_12_2_337 Phases=3 bus1=n_campus_c.1.2.3 bus2=e_7_12_2_337.1.2.3 Units=km Length=0.309372 Rmatrix=[0.0710846664058     0.012029666599     0.012029666599|  0.012029666599    0.0710846664058     0.012029666599|  0.012029666599     0.012029666599    0.0710846664058|] Xmatrix=[ 0.138888666473    0.0503056665535    0.0503056665535| 0.0503056665535     0.138888666473    0.0503056665535| 0.0503056665535    0.0503056665535     0.138888666473|] Cmatrix=[0                  0                  0| 0                  0                  0| 0                  0                  0|]
New Line.bus_nc17_ebu2_lab_pri Phases=3 bus1=bus_nc17.1.2.3 bus2=ebu2_lab_pri.1.2.3 Units=km Length=0.333756 Rmatrix=[0.0710846663751     0.012029666591     0.012029666591|  0.012029666591    0.0710846663755     0.012029666591|  0.012029666591     0.012029666591    0.0710846663754|] Xmatrix=[  0.13888866645    0.0503056665403    0.0503056665402| 0.0503056665403      0.13888866645    0.0503056665403| 0.0503056665402    0.0503056665403      0.13888866645|] Cmatrix=[0                  0                  0| 0                  0                  0| 0                  0                  0|]
New Line.bus_nc17_e_7_11_17 Phases=3 bus1=bus_nc17.1.2.3 bus2=e_7_11_17.1.2.3 Units=km Length=0.05334 Rmatrix=[0.0710846666663    0.0120296666667    0.0120296666667| 0.0120296666667    0.0710846666666    0.0120296666667| 0.0120296666667    0.0120296666667     0.071084666667|] Xmatrix=[ 0.138888666665    0.0503056666666    0.0503056666667| 0.0503056666666     0.138888666667    0.0503056666667| 0.0503056666667    0.0503056666667     0.138888666667|] Cmatrix=[0                  0                  0| 0                  0                  0| 0                  0                  0|]
New Line.n_campus_a_bus_nc17 Phases=3 bus1=n_campus_a.1.2.3 bus2=bus_nc17.1.2.3 Units=km Length=0.0009144 Rmatrix=[0.0710846666667    0.0120296666667    0.0120296666667| 0.0120296666667    0.0710846666667    0.0120296666667| 0.0120296666667    0.0120296666667    0.0710846666667|] Xmatrix=[ 0.138888666666    0.0503056666666    0.0503056666667| 0.0503056666666     0.138888666667    0.0503056666667| 0.0503056666667    0.0503056666667     0.138888666667|] Cmatrix=[0                  0                  0| 0                  0                  0| 0                  0                  0|]
New Line.n_campus_a_e_1_9_3_305 Phases=3 bus1=n_campus_a.1.2.3 bus2=e_1_9_3_305.1.2.3 Units=km Length=0.429768 Rmatrix=[0.0710846661423    0.0120296665339    0.0120296665331| 0.0120296665339    0.0710846661549    0.0120296665336| 0.0120296665331    0.0120296665336    0.0710846661527|] Xmatrix=[ 0.138888666277    0.0503056664437    0.0503056664419| 0.0503056664437      0.13888866629    0.0503056664432| 0.0503056664419    0.0503056664432     0.138888666274|] Cmatrix=[0                  0                  0| 0                  0                  0| 0                  0                  0|]
New Line.n_campus_a_e_1_9_1_11 Phases=3 bus1=n_campus_a.1.2.3 bus2=e_1_9_1_11.1.2.3 Units=km Length=0.432816 Rmatrix=[0.0710846661414    0.0120296665307    0.0120296665305| 0.0120296665307    0.0710846661389    0.0120296665303| 0.0120296665305    0.0120296665303    0.0710846661418|] Xmatrix=[ 0.138888666276    0.0503056664391    0.0503056664381| 0.0503056664391     0.138888666271    0.0503056664392| 0.0503056664381    0.0503056664392     0.138888666261|] Cmatrix=[0                  0                  0| 0                  0                  0| 0                  0                  0|]
New Line.n_campus_a_e_2_9_15 Phases=3 bus1=n_campus_a.1.2.3 bus2=e_2_9_15.1.2.3 Units=km Length=1.66878 Rmatrix=[0.0710846571225    0.0120296641912    0.0120296641912| 0.0120296641912    0.0710846571223    0.0120296641914| 0.0120296641912    0.0120296641914    0.0710846571177|] Xmatrix=[ 0.138888659586    0.0503056625279    0.0503056625273| 0.0503056625279     0.138888659593    0.0503056625273| 0.0503056625273    0.0503056625273     0.138888659584|] Cmatrix=[0                  0                  0| 0                  0                  0| 0                  0                  0|]
New Line.n_campus_a_e_2_9_12 Phases=3 bus1=n_campus_a.1.2.3 bus2=e_2_9_12.1.2.3 Units=km Length=1.56972 Rmatrix=[0.0710846592703     0.012029664749    0.0120296647495|  0.012029664749    0.0710846592711    0.0120296647492| 0.0120296647495    0.0120296647492     0.071084659271|] Xmatrix=[ 0.138888661187    0.0503056634597    0.0503056634602| 0.0503056634597     0.138888661169    0.0503056634586| 0.0503056634602    0.0503056634586     0.138888661187|] Cmatrix=[0                  0                  0| 0                  0                  0| 0                  0                  0|]
New Line.revelle_2_t_pharm_esa_p Phases=3 bus1=revelle_2.1.2.3 bus2=t_pharm_esa_p.1.2.3 Units=km Length=0.40386 Rmatrix=[0.0710846657441    0.0120296664258    0.0120296664258| 0.0120296664258    0.0710846657441    0.0120296664258| 0.0120296664258    0.0120296664258    0.0710846657441|] Xmatrix=[ 0.138888665981    0.0503056662651    0.0503056662651| 0.0503056662651     0.138888665981    0.0503056662651| 0.0503056662651    0.0503056662651     0.138888665981|] Cmatrix=[0                  0                  0| 0                  0                  0| 0                  0                  0|]
New Line.revelle_2_black_box_pri Phases=3 bus1=revelle_2.1.2.3 bus2=black_box_pri.1.2.3 Units=km Length=0.562356 Rmatrix=[0.0710846646777    0.0120296661505    0.0120296661505| 0.0120296661505    0.0710846646777    0.0120296661505| 0.0120296661505    0.0120296661505    0.0710846646777|] Xmatrix=[  0.13888866519    0.0503056658037    0.0503056658037| 0.0503056658037      0.13888866519    0.0503056658037| 0.0503056658037    0.0503056658037      0.13888866519|] Cmatrix=[0                  0                  0| 0                  0                  0| 0                  0                  0|]
New Line.revelle_2_sio_1_sub Phases=3 bus1=revelle_2.1.2.3 bus2=sio_1_sub.1.2.3 Units=km Length=2.054352 Rmatrix=[0.0710846507091    0.0120296625289    0.0120296625289| 0.0120296625289    0.0710846507091    0.0120296625289| 0.0120296625289    0.0120296625289    0.0710846507091|] Xmatrix=[ 0.138888654821    0.0503056597461    0.0503056597461| 0.0503056597461     0.138888654821    0.0503056597461| 0.0503056597461    0.0503056597461     0.138888654821|] Cmatrix=[0                  0                  0| 0                  0                  0| 0                  0                  0|]
New Line.revelle_2_ss_30_rc Phases=3 bus1=revelle_2.1.2.3 bus2=ss_30_rc.1.2.3 Units=km Length=0.291084 Rmatrix=[0.0710846664519     0.012029666611     0.012029666611|  0.012029666611    0.0710846664519     0.012029666611|  0.012029666611     0.012029666611    0.0710846664519|] Xmatrix=[ 0.138888666507    0.0503056665735    0.0503056665735| 0.0503056665735     0.138888666507    0.0503056665735| 0.0503056665735    0.0503056665735     0.138888666507|] Cmatrix=[0                  0                  0| 0                  0                  0| 0                  0                  0|]
New Line.revelle_2_psb Phases=3 bus1=revelle_2.1.2.3 bus2=psb.1.2.3 Units=km Length=0.094488 Rmatrix=[ 1.15105354776     0.703150322221     0.703150322218| 0.703150322221      1.15105354776     0.703150322206| 0.703150322218     0.703150322206      1.15105354778|] Xmatrix=[ 1.26271419332      0.61997354823     0.619973548232|  0.61997354823      1.26271419325     0.619973548213| 0.619973548232     0.619973548213      1.26271419331|] Cmatrix=[0                  0                  0| 0                  0                  0| 0                  0                  0|]
New Line.revelle_1_e_10_11_14_109 Phases=3 bus1=revelle_1.1.2.3 bus2=e_10_11_14_109.1.2.3 Units=km Length=0.21336 Rmatrix=[0.0710846665658    0.0120296666405    0.0120296666405| 0.0120296666405    0.0710846665658    0.0120296666405| 0.0120296666405    0.0120296666405    0.0710846665658|] Xmatrix=[ 0.138888666592    0.0503056666229    0.0503056666229| 0.0503056666229     0.138888666592    0.0503056666229| 0.0503056666229    0.0503056666229     0.138888666592|] Cmatrix=[0                  0                  0| 0                  0                  0| 0                  0                  0|]
New Line.revelle_1_ss_31_rc Phases=3 bus1=revelle_1.1.2.3 bus2=ss_31_rc.1.2.3 Units=km Length=0.291084 Rmatrix=[0.0710846664519     0.012029666611     0.012029666611|  0.012029666611    0.0710846664519     0.012029666611|  0.012029666611     0.012029666611    0.0710846664519|] Xmatrix=[ 0.138888666507    0.0503056665735    0.0503056665735| 0.0503056665735     0.138888666507    0.0503056665735| 0.0503056665735    0.0503056665735     0.138888666507|] Cmatrix=[0                  0                  0| 0                  0                  0| 0                  0                  0|]
New Line.revelle_1_pri_bio_med Phases=3 bus1=revelle_1.1.2.3 bus2=pri_bio_med.1.2.3 Units=km Length=0.536448 Rmatrix=[0.0710846643069    0.0120296660516    0.0120296660516| 0.0120296660516    0.0710846643069    0.0120296660516| 0.0120296660516    0.0120296660516    0.0710846643069|] Xmatrix=[ 0.138888664914    0.0503056656406    0.0503056656406| 0.0503056656406     0.138888664914    0.0503056656406| 0.0503056656406    0.0503056656406     0.138888664914|] Cmatrix=[0                  0                  0| 0                  0                  0| 0                  0                  0|]
New Line.revelle_1_psa Phases=3 bus1=revelle_1.1.2.3 bus2=psa.1.2.3 Units=km Length=0.094488 Rmatrix=[ 1.15105354771      0.70315032221     0.703150322213|  0.70315032221      1.15105354774     0.703150322218| 0.703150322213     0.703150322218      1.15105354779|] Xmatrix=[ 1.26271419342     0.619973548274     0.619973548252| 0.619973548274      1.26271419336     0.619973548248| 0.619973548252     0.619973548248      1.26271419324|] Cmatrix=[0                  0                  0| 0                  0                  0| 0                  0                  0|]
New Line.e_1_5_11_t_341_pri Phases=3 bus1=e_1_5_11.1.2.3 bus2=t_341_pri.1.2.3 Units=km Length=0.46482 Rmatrix=[0.0710846657005    0.0120296664161    0.0120296664161| 0.0120296664161    0.0710846657005    0.0120296664161| 0.0120296664161    0.0120296664161    0.0710846657005|] Xmatrix=[ 0.138888665949    0.0503056662476    0.0503056662476| 0.0503056662476     0.138888665949    0.0503056662476| 0.0503056662476    0.0503056662476     0.138888665949|] Cmatrix=[0                  0                  0| 0                  0                  0| 0                  0                  0|]
New Line.e_1_5_11_ss_56_mc Phases=3 bus1=e_1_5_11.1.2.3 bus2=ss_56_mc.1.2.3 Units=km Length=0.085344 Rmatrix=[0.0710846666667    0.0120296666667    0.0120296666667| 0.0120296666667    0.0710846666667    0.0120296666667| 0.0120296666667    0.0120296666667    0.0710846666667|] Xmatrix=[ 0.138888666667    0.0503056666667    0.0503056666667| 0.0503056666667     0.138888666667    0.0503056666667| 0.0503056666667    0.0503056666667     0.138888666667|] Cmatrix=[0                  0                  0| 0                  0                  0| 0                  0                  0|]
New Line.e_1_9_2_305_bus_t_318_pri Phases=3 bus1=e_1_9_2_305.1.2.3 bus2=bus_t_318_pri.1.2.3 Units=km Length=0.240792 Rmatrix=[0.0710846662562      0.01202966656      0.01202966656|   0.01202966656    0.0710846662562      0.01202966656|   0.01202966656      0.01202966656    0.0710846662562|] Xmatrix=[ 0.138888666362    0.0503056664885    0.0503056664885| 0.0503056664885     0.138888666362    0.0503056664885| 0.0503056664885    0.0503056664885     0.138888666362|] Cmatrix=[0                  0                  0| 0                  0                  0| 0                  0                  0|]
New Line.e_1_9_2_305_hi_bay_ph_pri Phases=3 bus1=e_1_9_2_305.1.2.3 bus2=hi_bay_ph_pri.1.2.3 Units=km Length=0.067056 Rmatrix=[0.0710846666667    0.0120296666667    0.0120296666667| 0.0120296666667    0.0710846666667    0.0120296666667| 0.0120296666667    0.0120296666667    0.0710846666667|] Xmatrix=[ 0.138888666667    0.0503056666667    0.0503056666667| 0.0503056666667     0.138888666667    0.0503056666667| 0.0503056666667    0.0503056666667     0.138888666667|] Cmatrix=[0                  0                  0| 0                  0                  0| 0                  0                  0|]
New Line.e_1_7_8_bus_t_238_pri Phases=3 bus1=e_1_7_8.1.2.3 bus2=bus_t_238_pri.1.2.3 Units=km Length=0.470916 Rmatrix=[0.0710846656657    0.0120296664059    0.0120296664059| 0.0120296664059    0.0710846656657    0.0120296664059| 0.0120296664059    0.0120296664059    0.0710846656657|] Xmatrix=[ 0.138888665923    0.0503056662316    0.0503056662316| 0.0503056662316     0.138888665923    0.0503056662316| 0.0503056662316    0.0503056662316     0.138888665923|] Cmatrix=[0                  0                  0| 0                  0                  0| 0                  0                  0|]
New Line.e_1_7_8_ss_104_wc Phases=3 bus1=e_1_7_8.1.2.3 bus2=ss_104_wc.1.2.3 Units=km Length=0.0762 Rmatrix=[0.0710846666667    0.0120296666667    0.0120296666667| 0.0120296666667    0.0710846666667    0.0120296666667| 0.0120296666667    0.0120296666667    0.0710846666667|] Xmatrix=[ 0.138888666667    0.0503056666667    0.0503056666667| 0.0503056666667     0.138888666667    0.0503056666667| 0.0503056666667    0.0503056666667     0.138888666667|] Cmatrix=[0                  0                  0| 0                  0                  0| 0                  0                  0|]
New Line.e_1_8_11_e_1_5_11 Phases=3 bus1=e_1_8_11.1.2.3 bus2=e_1_5_11.1.2.3 Units=km Length=0.338328 Rmatrix=[0.0710846663032    0.0120296665725    0.0120296665725| 0.0120296665725    0.0710846663034    0.0120296665725| 0.0120296665725    0.0120296665725    0.0710846663032|] Xmatrix=[ 0.138888666397    0.0503056665091    0.0503056665091| 0.0503056665091     0.138888666397    0.0503056665091| 0.0503056665091    0.0503056665091     0.138888666397|] Cmatrix=[0                  0                  0| 0                  0                  0| 0                  0                  0|]
New Line.e_1_8_11_bus_t_79_pri Phases=3 bus1=e_1_8_11.1.2.3 bus2=bus_t_79_pri.1.2.3 Units=km Length=0.027432 Rmatrix=[ 0.086030555554    0.0143997222218    0.0143997222218| 0.0143997222218     0.086030555554    0.0143997222218| 0.0143997222218    0.0143997222218     0.086030555554|] Xmatrix=[ 0.140528888888    0.0503055555552    0.0503055555552| 0.0503055555552     0.140528888888    0.0503055555552| 0.0503055555552    0.0503055555552     0.140528888888|] Cmatrix=[0                  0                  0| 0                  0                  0| 0                  0                  0|]
New Line.e_1_9_11_e_1_8_11 Phases=3 bus1=e_1_9_11.1.2.3 bus2=e_1_8_11.1.2.3 Units=km Length=0.03048 Rmatrix=[0.0710846666667    0.0120296666667    0.0120296666667| 0.0120296666667    0.0710846666667    0.0120296666667| 0.0120296666667    0.0120296666667    0.0710846666667|] Xmatrix=[ 0.138888666667    0.0503056666667    0.0503056666667| 0.0503056666667     0.138888666667    0.0503056666667| 0.0503056666667    0.0503056666667     0.138888666667|] Cmatrix=[0                  0                  0| 0                  0                  0| 0                  0                  0|]
New Line.e_1_9_11_serf_bldg_pri Phases=3 bus1=e_1_9_11.1.2.3 bus2=serf_bldg_pri.1.2.3 Units=km Length=0.06096 Rmatrix=[0.0710846666667    0.0120296666667    0.0120296666667| 0.0120296666667    0.0710846666667    0.0120296666667| 0.0120296666667    0.0120296666667    0.0710846666667|] Xmatrix=[ 0.138888666667    0.0503056666667    0.0503056666667| 0.0503056666667     0.138888666667    0.0503056666667| 0.0503056666667    0.0503056666667     0.138888666667|] Cmatrix=[0                  0                  0| 0                  0                  0| 0                  0                  0|]
New Line.e_1_9_8_ss_42_wc Phases=3 bus1=e_1_9_8.1.2.3 bus2=ss_42_wc.1.2.3 Units=km Length=0.2670048 Rmatrix=[0.0710846664208    0.0120296666025    0.0120296666025| 0.0120296666025    0.0710846664205    0.0120296666025| 0.0120296666025    0.0120296666025    0.0710846664208|] Xmatrix=[ 0.138888666484    0.0503056665597    0.0503056665597| 0.0503056665597     0.138888666484    0.0503056665598| 0.0503056665597    0.0503056665598     0.138888666484|] Cmatrix=[0                  0                  0| 0                  0                  0| 0                  0                  0|]
New Line.e_1_9_8_e_1_7_8 Phases=3 bus1=e_1_9_8.1.2.3 bus2=e_1_7_8.1.2.3 Units=km Length=0.149352 Rmatrix=[0.0710846666339    0.0120296666582    0.0120296666582| 0.0120296666582    0.0710846666339    0.0120296666582| 0.0120296666582    0.0120296666582    0.0710846666339|] Xmatrix=[ 0.138888666642    0.0503056666524    0.0503056666524| 0.0503056666524     0.138888666642    0.0503056666524| 0.0503056666524    0.0503056666524     0.138888666642|] Cmatrix=[0                  0                  0| 0                  0                  0| 0                  0                  0|]
New Line.e_1_9_3_305_e_1_9_2_305 Phases=3 bus1=e_1_9_3_305.1.2.3 bus2=e_1_9_2_305.1.2.3 Units=km Length=0.109728 Rmatrix=[0.0710846666667    0.0120296666667    0.0120296666667| 0.0120296666667    0.0710846666666    0.0120296666667| 0.0120296666667    0.0120296666667    0.0710846666667|] Xmatrix=[ 0.138888666667    0.0503056666667    0.0503056666667| 0.0503056666667     0.138888666667    0.0503056666667| 0.0503056666667    0.0503056666667     0.138888666667|] Cmatrix=[0                  0                  0| 0                  0                  0| 0                  0                  0|]
New Line.e_1_9_3_305_ss_110_vis_a Phases=3 bus1=e_1_9_3_305.1.2.3 bus2=ss_110_vis_a.1.2.3 Units=km Length=0.009144 Rmatrix=[0.0710846666667    0.0120296666667    0.0120296666667| 0.0120296666667    0.0710846666667    0.0120296666667| 0.0120296666667    0.0120296666667    0.0710846666667|] Xmatrix=[ 0.138888666667    0.0503056666667    0.0503056666667| 0.0503056666667     0.138888666667    0.0503056666667| 0.0503056666667    0.0503056666667     0.138888666667|] Cmatrix=[0                  0                  0| 0                  0                  0| 0                  0                  0|]
New Line.e_10_10_202_ss_64_sio Phases=3 bus1=e_10_10_202.1.2.3 bus2=ss_64_sio.1.2.3 Units=km Length=0.370332 Rmatrix=[0.137879872105     0.022621766401     0.022621766401| 0.022621766401     0.137879872105     0.022621766401| 0.022621766401     0.022621766401     0.137879872105|] Xmatrix=[ 0.146219042423    0.0503051697655    0.0503051697655| 0.0503051697655     0.146219042423    0.0503051697655| 0.0503051697655    0.0503051697655     0.146219042423|] Cmatrix=[0                  0                  0| 0                  0                  0| 0                  0                  0|]
New Line.e_10_10_202_e_10_11_1_202 Phases=3 bus1=e_10_10_202.1.2.3 bus2=e_10_11_1_202.1.2.3 Units=km Length=0.096012 Rmatrix=[0.16076            0.02625            0.02625| 0.02625            0.16076            0.02625| 0.02625            0.02625            0.16076|] Xmatrix=[ 0.14873           0.050305           0.050305| 0.050305            0.14873           0.050305| 0.050305           0.050305            0.14873|] Cmatrix=[0                  0                  0| 0                  0                  0| 0                  0                  0|]
New Line.e_10_11_1_202_bus_t_123_pri Phases=3 bus1=e_10_11_1_202.1.2.3 bus2=bus_t_123_pri.1.2.3 Units=km Length=0.054864 Rmatrix=[ 0.153287055552    0.0250649722214    0.0250649722214| 0.0250649722214     0.153287055552    0.0250649722214| 0.0250649722214    0.0250649722214     0.153287055552|] Xmatrix=[ 0.147909888888    0.0503050555547    0.0503050555547| 0.0503050555547     0.147909888888    0.0503050555547| 0.0503050555547    0.0503050555547     0.147909888888|] Cmatrix=[0                  0                  0| 0                  0                  0| 0                  0                  0|]
New Line.e_10_11_1_202_ss_67_sio Phases=3 bus1=e_10_11_1_202.1.2.3 bus2=ss_67_sio.1.2.3 Units=km Length=0.019812 Rmatrix=[0.16076            0.02625            0.02625| 0.02625            0.16076            0.02625| 0.02625            0.02625            0.16076|] Xmatrix=[ 0.14873           0.050305           0.050305| 0.050305            0.14873           0.050305| 0.050305           0.050305            0.14873|] Cmatrix=[0                  0                  0| 0                  0                  0| 0                  0                  0|]
New Line.e_10_11_14_109_sio_2_sub Phases=3 bus1=e_10_11_14_109.1.2.3 bus2=sio_2_sub.1.2.3 Units=km Length=1.840992 Rmatrix=[0.0710846564877     0.012029664028     0.012029664028|  0.012029664028    0.0710846564877     0.012029664028|  0.012029664028     0.012029664028    0.0710846564877|] Xmatrix=[ 0.138888659111    0.0503056622527    0.0503056622527| 0.0503056622527     0.138888659111    0.0503056622527| 0.0503056622527    0.0503056622527     0.138888659111|] Cmatrix=[0                  0                  0| 0                  0                  0| 0                  0                  0|]
New Line.e_10_11_14_109_bus_t_257_pri Phases=3 bus1=e_10_11_14_109.1.2.3 bus2=bus_t_257_pri.1.2.3 Units=km Length=0.262128 Rmatrix=[0.0710846664248    0.0120296666038    0.0120296666038| 0.0120296666038    0.0710846664248    0.0120296666038| 0.0120296666038    0.0120296666038    0.0710846664248|] Xmatrix=[ 0.138888666487    0.0503056665617    0.0503056665617| 0.0503056665617     0.138888666487    0.0503056665617| 0.0503056665617    0.0503056665617     0.138888666487|] Cmatrix=[0                  0                  0| 0                  0                  0| 0                  0                  0|]
New Line.sio_2_sub_sverd_us1_pri Phases=3 bus1=sio_2_sub.1.2.3 bus2=sverd_us1_pri.1.2.3 Units=km Length=0.3429 Rmatrix=[ 0.156375871319    0.0255547834084    0.0255547834084| 0.0255547834084     0.156375871319    0.0255547834084| 0.0255547834084    0.0255547834084     0.156375871319|] Xmatrix=[ 0.148248868193    0.0503050323746    0.0503050323746| 0.0503050323746     0.148248868193    0.0503050323746| 0.0503050323746    0.0503050323746     0.148248868193|] Cmatrix=[0                  0                  0| 0                  0                  0| 0                  0                  0|]
New Line.sio_1_sub_e_10_10_202 Phases=3 bus1=sio_1_sub.1.2.3 bus2=e_10_10_202.1.2.3 Units=km Length=0.25146 Rmatrix=[0.0710846665151    0.0120296666274    0.0120296666274| 0.0120296666274    0.0710846665151    0.0120296666274| 0.0120296666274    0.0120296666274    0.0710846665151|] Xmatrix=[ 0.138888666554    0.0503056666009    0.0503056666009| 0.0503056666009     0.138888666554    0.0503056666009| 0.0503056666009    0.0503056666009     0.138888666554|] Cmatrix=[0                  0                  0| 0                  0                  0| 0                  0                  0|]
New Line.sio_1_sub_ss_52_sio Phases=3 bus1=sio_1_sub.1.2.3 bus2=ss_52_sio.1.2.3 Units=km Length=0.516636 Rmatrix=[ 0.159437352253    0.0260402599453    0.0260402599453| 0.0260402599453     0.159437352253    0.0260402599453| 0.0260402599453    0.0260402599453     0.159437352253|] Xmatrix=[ 0.148584847797    0.0503050093973    0.0503050093973| 0.0503050093973     0.148584847797    0.0503050093973| 0.0503050093973    0.0503050093973     0.148584847797|] Cmatrix=[0                  0                  0| 0                  0                  0| 0                  0                  0|]
New Line.ss_83_mc_12_phys_ed_pri Phases=3 bus1=ss_83_mc_12.1.2.3 bus2=phys_ed_pri.1.2.3 Units=km Length=0.231648 Rmatrix=[0.0710846666667    0.0120296666667    0.0120296666667| 0.0120296666667    0.0710846666667    0.0120296666667| 0.0120296666667    0.0120296666667    0.0710846666667|] Xmatrix=[ 0.138888666667    0.0503056666667    0.0503056666667| 0.0503056666667     0.138888666667    0.0503056666667| 0.0503056666667    0.0503056666667     0.138888666667|] Cmatrix=[0                  0                  0| 0                  0                  0| 0                  0                  0|]
New Line.ss_83_mc_15_ss_41_mc Phases=3 bus1=ss_83_mc_15.1.2.3 bus2=ss_41_mc.1.2.3 Units=km Length=0.260604 Rmatrix=[ 0.071084666512    0.0120296666266    0.0120296666266| 0.0120296666266     0.071084666512    0.0120296666266| 0.0120296666266    0.0120296666266    0.0710846665121|] Xmatrix=[ 0.138888666552    0.0503056665996    0.0503056665996| 0.0503056665996     0.138888666552    0.0503056665996| 0.0503056665996    0.0503056665996     0.138888666552|] Cmatrix=[0                  0                  0| 0                  0                  0| 0                  0                  0|]
New Line.ss_83_mc_15_sw_t_219 Phases=3 bus1=ss_83_mc_15.1.2.3 bus2=sw_t_219.1.2.3 Units=km Length=0.006096 Rmatrix=[0.0710846666666    0.0120296666667    0.0120296666667| 0.0120296666667    0.0710846666666    0.0120296666667| 0.0120296666667    0.0120296666667    0.0710846666667|] Xmatrix=[ 0.138888666667    0.0503056666667    0.0503056666667| 0.0503056666667     0.138888666667    0.0503056666667| 0.0503056666667    0.0503056666667     0.138888666667|] Cmatrix=[0                  0                  0| 0                  0                  0| 0                  0                  0|]
New Line.e_2_6_12_ss_83_mc_12 Phases=3 bus1=e_2_6_12.1.2.3 bus2=ss_83_mc_12.1.2.3 Units=km Length=0.330708 Rmatrix=[0.0710846661844    0.0120296665416    0.0120296665416| 0.0120296665416    0.0710846661844    0.0120296665416| 0.0120296665416    0.0120296665416    0.0710846661844|] Xmatrix=[ 0.138888666309    0.0503056664575    0.0503056664575| 0.0503056664575     0.138888666309    0.0503056664575| 0.0503056664575    0.0503056664575     0.138888666309|] Cmatrix=[0                  0                  0| 0                  0                  0| 0                  0                  0|]
New Line.e_2_6_12_sb_b2a Phases=3 bus1=e_2_6_12.1.2.3 bus2=sb_b2a.1.2.3 Units=km Length=0.2286 Rmatrix=[0.0710846664849     0.012029666619     0.012029666619|  0.012029666619    0.0710846664849     0.012029666619|  0.012029666619     0.012029666619    0.0710846664849|] Xmatrix=[ 0.138888666531    0.0503056665874    0.0503056665874| 0.0503056665874     0.138888666531    0.0503056665874| 0.0503056665874    0.0503056665874     0.138888666531|] Cmatrix=[0                  0                  0| 0                  0                  0| 0                  0                  0|]
New Line.e_2_9_12_bldg_3b_12kv Phases=3 bus1=e_2_9_12.1.2.3 bus2=bldg_3b_12kv.1.2.3 Units=km Length=0.04572 Rmatrix=[0.0710846666667    0.0120296666667    0.0120296666667| 0.0120296666667    0.0710846666667    0.0120296666667| 0.0120296666667    0.0120296666667    0.0710846666667|] Xmatrix=[ 0.138888666667    0.0503056666667    0.0503056666667| 0.0503056666667     0.138888666667    0.0503056666667| 0.0503056666667    0.0503056666667     0.138888666667|] Cmatrix=[0                  0                  0| 0                  0                  0| 0                  0                  0|]
New Line.e_2_9_12_e_2_6_12 Phases=3 bus1=e_2_9_12.1.2.3 bus2=e_2_6_12.1.2.3 Units=km Length=0.598932 Rmatrix=[0.0710846657622    0.0120296664322    0.0120296664322| 0.0120296664322    0.0710846657622    0.0120296664322| 0.0120296664322    0.0120296664322    0.0710846657622|] Xmatrix=[ 0.138888665995    0.0503056662745    0.0503056662745| 0.0503056662745     0.138888665995    0.0503056662745| 0.0503056662745    0.0503056662745     0.138888665995|] Cmatrix=[0                  0                  0| 0                  0                  0| 0                  0                  0|]
New Line.e_2_9_15_bldg_3b_15 Phases=3 bus1=e_2_9_15.1.2.3 bus2=bldg_3b_15.1.2.3 Units=km Length=0.04572 Rmatrix=[0.0710846666667    0.0120296666667    0.0120296666667| 0.0120296666667    0.0710846666667    0.0120296666667| 0.0120296666667    0.0120296666667    0.0710846666667|] Xmatrix=[ 0.138888666667    0.0503056666667    0.0503056666667| 0.0503056666667     0.138888666667    0.0503056666667| 0.0503056666667    0.0503056666667     0.138888666667|] Cmatrix=[0                  0                  0| 0                  0                  0| 0                  0                  0|]
New Line.e_2_9_15_ss_83_mc_15 Phases=3 bus1=e_2_9_15.1.2.3 bus2=ss_83_mc_15.1.2.3 Units=km Length=0.92964 Rmatrix=[0.0710846626758    0.0120296656313    0.0120296656313| 0.0120296656313    0.0710846626759    0.0120296656312| 0.0120296656313    0.0120296656312    0.0710846626747|] Xmatrix=[ 0.138888663704    0.0503056649353    0.0503056649351| 0.0503056649353     0.138888663706    0.0503056649352| 0.0503056649351    0.0503056649352     0.138888663705|] Cmatrix=[0                  0                  0| 0                  0                  0| 0                  0                  0|]
New Line.east_campus_2_revelle_2 Phases=3 bus1=east_campus_2.1.2.3 bus2=revelle_2.1.2.3 Units=km Length=2.36982 Rmatrix=[ 0.071084649839    0.0120296623044    0.0120296623044| 0.0120296623044     0.071084649839    0.0120296623044| 0.0120296623044    0.0120296623044    0.0710846498391|] Xmatrix=[ 0.138888654176    0.0503056593697    0.0503056593697| 0.0503056593697     0.138888654176    0.0503056593697| 0.0503056593697    0.0503056593697     0.138888654176|] Cmatrix=[0                  0                  0| 0                  0                  0| 0                  0                  0|]
New Line.east_campus_2_mcss_mb Phases=3 bus1=east_campus_2.1.2.3 bus2=mcss_mb.1.2.3 Units=km Length=0.4105656 Rmatrix=[ 0.0513999996897   0.00874899992379   0.00874899992379| 0.00874899992379    0.0513999996897   0.00874899992379| 0.00874899992379   0.00874899992379    0.0513999996897|] Xmatrix=[  0.12576733301    0.0437463331743    0.0437463331743| 0.0437463331743      0.12576733301    0.0437463331743| 0.0437463331743    0.0437463331743      0.12576733301|] Cmatrix=[0                  0                  0| 0                  0                  0| 0                  0                  0|]
New Line.east_campus_2_n_campus_b Phases=3 bus1=east_campus_2.1.2.3 bus2=n_campus_b.1.2.3 Units=km Length=1.152144 Rmatrix=[0.0710846627137    0.0120296656419    0.0120296656419| 0.0120296656419    0.0710846627138    0.0120296656419| 0.0120296656419    0.0120296656419    0.0710846627137|] Xmatrix=[ 0.138888663732    0.0503056649526    0.0503056649526| 0.0503056649526     0.138888663732    0.0503056649526| 0.0503056649526    0.0503056649526     0.138888663732|] Cmatrix=[0                  0                  0| 0                  0                  0| 0                  0                  0|]
New Line.east_campus_3_mcss_mc Phases=3 bus1=east_campus_3.1.2.3 bus2=mcss_mc.1.2.3 Units=km Length=0.4041648 Rmatrix=[ 0.0513999997033   0.00874899992715   0.00874899992715| 0.00874899992715    0.0513999997033   0.00874899992715| 0.00874899992715   0.00874899992715    0.0513999997033|] Xmatrix=[ 0.125767333024    0.0437463331813    0.0437463331813| 0.0437463331813     0.125767333024    0.0437463331813| 0.0437463331813    0.0437463331813     0.125767333024|] Cmatrix=[0                  0                  0| 0                  0                  0| 0                  0                  0|]
New Line.east_campus_3_n_campus_c Phases=3 bus1=east_campus_3.1.2.3 bus2=n_campus_c.1.2.3 Units=km Length=1.146048 Rmatrix=[0.0710846627735    0.0120296656574    0.0120296656574| 0.0120296656574    0.0710846627735    0.0120296656574| 0.0120296656574    0.0120296656574    0.0710846627735|] Xmatrix=[ 0.138888663777    0.0503056649785    0.0503056649785| 0.0503056649785     0.138888663777    0.0503056649785| 0.0503056649785    0.0503056649785     0.138888663777|] Cmatrix=[0                  0                  0| 0                  0                  0| 0                  0                  0|]
New Line.e_5_5_436_t_270_pri Phases=3 bus1=e_5_5_436.1.2.3 bus2=t_270_pri.1.2.3 Units=km Length=0.278892 Rmatrix=[0.0710846665768    0.0120296666433    0.0120296666433| 0.0120296666433    0.0710846665768    0.0120296666433| 0.0120296666433    0.0120296666433    0.0710846665768|] Xmatrix=[   0.1388886666    0.0503056666277    0.0503056666277| 0.0503056666277       0.1388886666    0.0503056666277| 0.0503056666277    0.0503056666277       0.1388886666|] Cmatrix=[0                  0                  0| 0                  0                  0| 0                  0                  0|]
New Line.e_5_5_436_pri_t_306_shiley Phases=3 bus1=e_5_5_436.1.2.3 bus2=pri_t_306_shiley.1.2.3 Units=km Length=0.277368 Rmatrix=[0.0710846664302    0.0120296666042    0.0120296666042| 0.0120296666042    0.0710846664302    0.0120296666042| 0.0120296666042    0.0120296666042    0.0710846664302|] Xmatrix=[ 0.138888666491    0.0503056665631    0.0503056665631| 0.0503056665631     0.138888666491    0.0503056665631| 0.0503056665631    0.0503056665631     0.138888666491|] Cmatrix=[0                  0                  0| 0                  0                  0| 0                  0                  0|]
New Line.e_7_1_7_bus_t_287_pri Phases=3 bus1=e_7_1_7.1.2.3 bus2=bus_t_287_pri.1.2.3 Units=km Length=0.286512 Rmatrix=[0.0710846664415    0.0120296666083    0.0120296666083| 0.0120296666083    0.0710846664415    0.0120296666083| 0.0120296666083    0.0120296666083    0.0710846664415|] Xmatrix=[  0.1388886665     0.050305666569     0.050305666569| 0.050305666569       0.1388886665     0.050305666569| 0.050305666569     0.050305666569       0.1388886665|] Cmatrix=[0                  0                  0| 0                  0                  0| 0                  0                  0|]
New Line.e_7_1_7_c_service_pri Phases=3 bus1=e_7_1_7.1.2.3 bus2=c_service_pri.1.2.3 Units=km Length=1.210056 Rmatrix=[0.0710846619469    0.0120296654425    0.0120296654425| 0.0120296654425    0.0710846619469    0.0120296654425| 0.0120296654425    0.0120296654425    0.0710846619469|] Xmatrix=[ 0.138888663163    0.0503056646195    0.0503056646195| 0.0503056646195     0.138888663163    0.0503056646195| 0.0503056646195    0.0503056646195     0.138888663163|] Cmatrix=[0                  0                  0| 0                  0                  0| 0                  0                  0|]
New Line.e_7_11_17_bus_t_347_pri Phases=3 bus1=e_7_11_17.1.2.3 bus2=bus_t_347_pri.1.2.3 Units=km Length=0.880872 Rmatrix=[ 0.071084663789    0.0120296659182    0.0120296659182| 0.0120296659182     0.071084663789    0.0120296659182| 0.0120296659182    0.0120296659182     0.071084663789|] Xmatrix=[  0.13888866453    0.0503056654167    0.0503056654167| 0.0503056654167      0.13888866453    0.0503056654167| 0.0503056654167    0.0503056654167      0.13888866453|] Cmatrix=[0                  0                  0| 0                  0                  0| 0                  0                  0|]
New Line.e_7_11_17_bus_t_326_pri Phases=3 bus1=e_7_11_17.1.2.3 bus2=bus_t_326_pri.1.2.3 Units=km Length=0.039624 Rmatrix=[0.0710846666652    0.0120296666663    0.0120296666663| 0.0120296666663    0.0710846666652    0.0120296666663| 0.0120296666663    0.0120296666663    0.0710846666652|] Xmatrix=[0.138888666666     0.050305666666     0.050305666666| 0.050305666666     0.138888666666     0.050305666666| 0.050305666666     0.050305666666     0.138888666666|] Cmatrix=[0                  0                  0| 0                  0                  0| 0                  0                  0|]
New Line.e_7_12_2_337_ss_82_wc Phases=3 bus1=e_7_12_2_337.1.2.3 bus2=ss_82_wc.1.2.3 Units=km Length=0.050292 Rmatrix=[0.0710846666667    0.0120296666667    0.0120296666667| 0.0120296666667    0.0710846666667    0.0120296666667| 0.0120296666667    0.0120296666667    0.0710846666667|] Xmatrix=[ 0.138888666667    0.0503056666667    0.0503056666667| 0.0503056666667     0.138888666667    0.0503056666667| 0.0503056666667    0.0503056666667     0.138888666667|] Cmatrix=[0                  0                  0| 0                  0                  0| 0                  0                  0|]
New Line.e_7_12_2_337_ss_91_wc Phases=3 bus1=e_7_12_2_337.1.2.3 bus2=ss_91_wc.1.2.3 Units=km Length=0.079248 Rmatrix=[0.0710846666667    0.0120296666667    0.0120296666667| 0.0120296666667    0.0710846666667    0.0120296666667| 0.0120296666667    0.0120296666667    0.0710846666667|] Xmatrix=[ 0.138888666667    0.0503056666667    0.0503056666667| 0.0503056666667     0.138888666667    0.0503056666667| 0.0503056666667    0.0503056666667     0.138888666667|] Cmatrix=[0                  0                  0| 0                  0                  0| 0                  0                  0|]
New Line.e_7_17_17_sw_t_071/072 Phases=3 bus1=e_7_17_17.1.2.3 bus2=sw_t_071/072.1.2.3 Units=km Length=0.256032 Rmatrix=[0.0710846665151    0.0120296666273    0.0120296666273| 0.0120296666273    0.0710846665151    0.0120296666273| 0.0120296666273    0.0120296666273    0.0710846665151|] Xmatrix=[ 0.138888666554    0.0503056666009    0.0503056666009| 0.0503056666009     0.138888666554    0.0503056666009| 0.0503056666009    0.0503056666009     0.138888666554|] Cmatrix=[0                  0                  0| 0                  0                  0| 0                  0                  0|]
New Line.e_7_17_17_e_7_19_17 Phases=3 bus1=e_7_17_17.1.2.3 bus2=e_7_19_17.1.2.3 Units=km Length=0.263652 Rmatrix=[0.0710846664835    0.0120296666192    0.0120296666192| 0.0120296666192    0.0710846664835    0.0120296666192| 0.0120296666192    0.0120296666192    0.0710846664835|] Xmatrix=[ 0.138888666531    0.0503056665872    0.0503056665872| 0.0503056665872     0.138888666531    0.0503056665872| 0.0503056665872    0.0503056665872     0.138888666531|] Cmatrix=[0                  0                  0| 0                  0                  0| 0                  0                  0|]
New Line.e_7_19_17_bus_t_179_pri Phases=3 bus1=e_7_19_17.1.2.3 bus2=bus_t_179_pri.1.2.3 Units=km Length=0.263652 Rmatrix=[ 0.173690546506    0.0282313562832    0.0282313562832| 0.0282313562832     0.173690546506    0.0282313562832| 0.0282313562832    0.0282313562832     0.173690546506|] Xmatrix=[0.150287680153     0.052657171358     0.052657171358| 0.052657171358     0.150287680153     0.052657171358| 0.052657171358     0.052657171358     0.150287680153|] Cmatrix=[0                  0                  0| 0                  0                  0| 0                  0                  0|]
New Line.e_7_19_17_bus_t_345_pri Phases=3 bus1=e_7_19_17.1.2.3 bus2=bus_t_345_pri.1.2.3 Units=km Length=0.649224 Rmatrix=[0.0710846613982    0.0120296652942    0.0120296652942| 0.0120296652942    0.0710846613982    0.0120296652942| 0.0120296652942    0.0120296652942    0.0710846613983|] Xmatrix=[ 0.138888662753    0.0503056643764    0.0503056643764| 0.0503056643764     0.138888662753    0.0503056643764| 0.0503056643764    0.0503056643764     0.138888662753|] Cmatrix=[0                  0                  0| 0                  0                  0| 0                  0                  0|]
New Line.t_204_sec_east_campus_1 Phases=3 bus1=t_204_sec.1.2.3 bus2=east_campus_1.1.2.3 Units=km Length=0.048768 Rmatrix=[0.0710846666667    0.0120296666667    0.0120296666667| 0.0120296666667    0.0710846666667    0.0120296666667| 0.0120296666667    0.0120296666667    0.0710846666667|] Xmatrix=[ 0.138888666667    0.0503056666667    0.0503056666667| 0.0503056666667     0.138888666667    0.0503056666667| 0.0503056666667    0.0503056666667     0.138888666667|] Cmatrix=[0                  0                  0| 0                  0                  0| 0                  0                  0|]
New Line.t_205_sec_east_campus_2 Phases=3 bus1=t_205_sec.1.2.3 bus2=east_campus_2.1.2.3 Units=km Length=0.067056 Rmatrix=[0.0710846666667    0.0120296666667    0.0120296666667| 0.0120296666667    0.0710846666667    0.0120296666667| 0.0120296666667    0.0120296666667    0.0710846666667|] Xmatrix=[ 0.138888666667    0.0503056666667    0.0503056666667| 0.0503056666667     0.138888666667    0.0503056666667| 0.0503056666667    0.0503056666667     0.138888666667|] Cmatrix=[0                  0                  0| 0                  0                  0| 0                  0                  0|]
New Line.t_277_sec_east_campus_3 Phases=3 bus1=t_277_sec.1.2.3 bus2=east_campus_3.1.2.3 Units=km Length=0.085344 Rmatrix=[0.0710846666667    0.0120296666667    0.0120296666667| 0.0120296666667    0.0710846666667    0.0120296666667| 0.0120296666667    0.0120296666667    0.0710846666667|] Xmatrix=[ 0.138888666667    0.0503056666667    0.0503056666667| 0.0503056666667     0.138888666667    0.0503056666667| 0.0503056666667    0.0503056666667     0.138888666667|] Cmatrix=[0                  0                  0| 0                  0                  0| 0                  0                  0|]
New Line.ss_42_wc_t_137_pri Phases=3 bus1=ss_42_wc.1.2.3 bus2=t_137_pri.1.2.3 Units=km Length=0.004572 Rmatrix=[ 0.258096666667    0.0415566666667    0.0415566666667| 0.0415566666667     0.258096666667    0.0415566666667| 0.0415566666667    0.0415566666667     0.258096666667|] Xmatrix=[0.15967            0.05468            0.05468| 0.05468            0.15967            0.05468| 0.05468            0.05468            0.15967|] Cmatrix=[0                  0                  0| 0                  0                  0| 0                  0                  0|]
New Line.ss_42_wc_t_138_pri Phases=3 bus1=ss_42_wc.1.2.3 bus2=t_138_pri.1.2.3 Units=km Length=0.004572 Rmatrix=[ 0.258096666667    0.0415566666667    0.0415566666667| 0.0415566666667     0.258096666667    0.0415566666667| 0.0415566666667    0.0415566666667     0.258096666667|] Xmatrix=[0.15967            0.05468            0.05468| 0.05468            0.15967            0.05468| 0.05468            0.05468            0.15967|] Cmatrix=[0                  0                  0| 0                  0                  0| 0                  0                  0|]
New Line.psa_psa_line_tg_1 Phases=3 bus1=psa.1.2.3 bus2=psa_line_tg_1.1.2.3 Units=km Length=0.0003048 Rmatrix=[0.0710846666662    0.0120296666665    0.0120296666667| 0.0120296666665     0.071084666666    0.0120296666666| 0.0120296666667    0.0120296666666    0.0710846666666|] Xmatrix=[ 0.138888666666    0.0503056666666    0.0503056666667| 0.0503056666666     0.138888666665    0.0503056666667| 0.0503056666667    0.0503056666667     0.138888666667|] Cmatrix=[0                  0                  0| 0                  0                  0| 0                  0                  0|]
New Line.ss_31_rc_ss_36_rc Phases=3 bus1=ss_31_rc.1.2.3 bus2=ss_36_rc.1.2.3 Units=km Length=0.173736 Rmatrix=[0.0710846663954    0.0120296665957    0.0120296665957| 0.0120296665957    0.0710846663954    0.0120296665957| 0.0120296665957    0.0120296665957    0.0710846663954|] Xmatrix=[ 0.138888666465    0.0503056665485    0.0503056665485| 0.0503056665485     0.138888666465    0.0503056665485| 0.0503056665485    0.0503056665485     0.138888666465|] Cmatrix=[0                  0                  0| 0                  0                  0| 0                  0                  0|]
New Line.ss_30_rc_sw_t_095 Phases=3 bus1=ss_30_rc.1.2.3 bus2=sw_t_095.1.2.3 Units=km Length=0.111252 Rmatrix=[ 0.071084666602    0.0120296666499    0.0120296666499| 0.0120296666499     0.071084666602    0.0120296666499| 0.0120296666499    0.0120296666499    0.0710846666021|] Xmatrix=[ 0.138888666619    0.0503056666386    0.0503056666386| 0.0503056666386     0.138888666619    0.0503056666386| 0.0503056666386    0.0503056666386     0.138888666619|] Cmatrix=[0                  0                  0| 0                  0                  0| 0                  0                  0|]
New Line.ss_104_wc_bus_t_350_pri Phases=3 bus1=ss_104_wc.1.2.3 bus2=bus_t_350_pri.1.2.3 Units=km Length=0.006096 Rmatrix=[0.0710846666665    0.0120296666667    0.0120296666667| 0.0120296666667    0.0710846666667    0.0120296666667| 0.0120296666667    0.0120296666667    0.0710846666667|] Xmatrix=[ 0.138888666667    0.0503056666667    0.0503056666667| 0.0503056666667     0.138888666667    0.0503056666667| 0.0503056666667    0.0503056666667     0.138888666667|] Cmatrix=[0                  0                  0| 0                  0                  0| 0                  0                  0|]
New Line.ss_104_wc_bus_t_351_pri Phases=3 bus1=ss_104_wc.1.2.3 bus2=bus_t_351_pri.1.2.3 Units=km Length=0.012192 Rmatrix=[0.0710846666667    0.0120296666667    0.0120296666667| 0.0120296666667    0.0710846666667    0.0120296666667| 0.0120296666667    0.0120296666667    0.0710846666668|] Xmatrix=[ 0.138888666667    0.0503056666667    0.0503056666667| 0.0503056666667     0.138888666667    0.0503056666667| 0.0503056666667    0.0503056666667     0.138888666667|] Cmatrix=[0                  0                  0| 0                  0                  0| 0                  0                  0|]
New Line.ss_104_wc_bus_t_352_pri Phases=3 bus1=ss_104_wc.1.2.3 bus2=bus_t_352_pri.1.2.3 Units=km Length=0.018288 Rmatrix=[0.0710846666666    0.0120296666667    0.0120296666667| 0.0120296666667    0.0710846666667    0.0120296666667| 0.0120296666667    0.0120296666667    0.0710846666667|] Xmatrix=[ 0.138888666667    0.0503056666667    0.0503056666667| 0.0503056666667     0.138888666667    0.0503056666667| 0.0503056666667    0.0503056666667     0.138888666667|] Cmatrix=[0                  0                  0| 0                  0                  0| 0                  0                  0|]
New Line.db_cp_bus_t_259_pri Phases=3 bus1=db_cp.1.2.3 bus2=bus_t_259_pri.1.2.3 Units=km Length=0.96012 Rmatrix=[3.11462874793      1.95972976168      1.95972976168| 1.95972976168      3.11462874793      1.95972976168| 1.95972976168      1.95972976168      3.11462874793|] Xmatrix=[3.30603332578      1.65573369536      1.65573369536| 1.65573369536      3.30603332578      1.65573369536| 1.65573369536      1.65573369536      3.30603332578|] Cmatrix=[0                  0                  0| 0                  0                  0| 0                  0                  0|]
New Transformer.T_109_HEALTH_CEN Windings=2 Buses=[SS_56_MC HEALTH_CENTER] Conns=[delta wye] kVs=[12.47        0.208] kVAs=[300  300] %Rs=[1.17        1.17] XHL=4.86 %Noloadloss=0 %imag=0 MaxTap=1.05 MinTap=0.95 NumTaps=4
New Transformer.T_117_BLDG_3B Windings=2 Buses=[SW_T_301/302 CRB_3B] Conns=[delta wye] kVs=[12.47         0.48] kVAs=[750  750] %Rs=[1.02        1.02] XHL=5.35 %Noloadloss=0 %imag=0 MaxTap=1.05 MinTap=0.95 NumTaps=4
New Transformer.T_123_HUBBS_HALL Windings=2 Buses=[BUS_T_123_PRI HUBBS_HALL] Conns=[delta wye] kVs=[12.47         0.48] kVAs=[2000  2000] %Rs=[0.86        0.86] XHL=6.24 %Noloadloss=0 %imag=0 MaxTap=1.05 MinTap=0.95 NumTaps=4
New Transformer.T_135_FACULTY Windings=2 Buses=[SS_41_MC FACULTY_CLUB] Conns=[delta wye] kVs=[12.47        0.208] kVAs=[300  300] %Rs=[0.94        0.94] XHL=3.9 %Noloadloss=0 %imag=0 MaxTap=1.05 MinTap=0.95 NumTaps=4
New Transformer.T_136_POWELL Windings=2 Buses=[BUS_T_136_PRI POWELL_STRUCT] Conns=[delta wye] kVs=[12.47         0.48] kVAs=[2000  2240] %Rs=[0.71        0.71] XHL=5.67 %Noloadloss=0 %imag=0 MaxTap=1.05 MinTap=0.95 NumTaps=4
New Transformer.T_137_EBU1 Windings=2 Buses=[T_137_PRI T_137_SEC_EBU1] Conns=[delta wye] kVs=[12.47         0.48] kVAs=[1500  2000] %Rs=[0.93        0.93] XHL=6.11 %Noloadloss=0 %imag=0 MaxTap=1.05 MinTap=0.95 NumTaps=4
New Transformer.T_138_EBU1 Windings=2 Buses=[T_138_PRI EBU1_T_138] Conns=[delta wye] kVs=[12.47         0.48] kVAs=[1500  2000] %Rs=[0.75        0.75] XHL=6.02 %Noloadloss=0 %imag=0 MaxTap=1.05 MinTap=0.95 NumTaps=4
New Transformer.T_151_PHYS_ED Windings=2 Buses=[PHYS_ED_PRI PHYS_ED_BLDGS] Conns=[delta wye] kVs=[12.47         0.48] kVAs=[500  500] %Rs=[0.94        0.94] XHL=4.4 %Noloadloss=0 %imag=0 MaxTap=1.05 MinTap=0.95 NumTaps=4
New Transformer.T_171_C_SERVICE Windings=2 Buses=[C_SERVICE_PRI T_171_SEC] Conns=[delta wye] kVs=[12.47         0.48] kVAs=[1500  1500] %Rs=[0.9         0.9] XHL=5.91 %Noloadloss=0 %imag=0 MaxTap=1.05 MinTap=0.95 NumTaps=4
New Transformer.T_179_O_VIEW Windings=2 Buses=[BUS_T_179_PRI T_179_OCEANVIEW_SEC] Conns=[delta wye] kVs=[12.47        0.208] kVAs=[75  75] %Rs=[1.02        1.02] XHL=3.22 %Noloadloss=0 %imag=0 MaxTap=1.05 MinTap=0.95 NumTaps=4
New Transformer.T_189_HI_BAY_PH Windings=2 Buses=[HI_BAY_PH_PRI HI_BAY_PHYSICS] Conns=[delta wye] kVs=[12.47         0.48] kVAs=[500  500] %Rs=[0.94        0.94] XHL=4.4 %Noloadloss=0 %imag=0 MaxTap=1.05 MinTap=0.95 NumTaps=4
New Transformer.T_192_MANDEVILLE Windings=2 Buses=[SW_T_219 MANDEVILLE_CTR] Conns=[delta wye] kVs=[12.47         0.48] kVAs=[1500  1500] %Rs=[0.88        0.88] XHL=5.78 %Noloadloss=0 %imag=0 MaxTap=1.05 MinTap=0.95 NumTaps=4
New Transformer.T_203_IGPP Windings=2 Buses=[SS_67_SIO IGPP_SUB] Conns=[delta wye] kVs=[12.47         0.48] kVAs=[750  750] %Rs=[1.11        1.11] XHL=5.8 %Noloadloss=0 %imag=0 MaxTap=1.05 MinTap=0.95 NumTaps=4
New Transformer.T_204 Windings=2 Buses=[SDG&E_69KV T_204_SEC] Conns=[delta wye] kVs=[69        12.47] kVAs=[16800  28000] %Rs=[0.36        0.36] XHL=7.55 %Noloadloss=0 %imag=0 sub=y MaxTap=1.05 MinTap=0.95 NumTaps=16
New Transformer.T_205 Windings=2 Buses=[SDG&E_69KV T_205_SEC] Conns=[delta wye] kVs=[69        12.47] kVAs=[16800  28000] %Rs=[0.37        0.37] XHL=7.61 %Noloadloss=0 %imag=0 MaxTap=1.05 MinTap=0.95 NumTaps=16
New Transformer.T_216_VISUAL_A Windings=2 Buses=[SS_110_VIS_A VISUAL_ARTS] Conns=[delta wye] kVs=[12.47         0.48] kVAs=[1500  1500] %Rs=[0.88        0.88] XHL=5.76 %Noloadloss=0 %imag=0 MaxTap=1.05 MinTap=0.95 NumTaps=4
New Transformer.T_219_RIMAC_US_1W Windings=2 Buses=[SW_T_071/072 US_2_RIMAC] Conns=[delta wye] kVs=[12.47         0.48] kVAs=[1500  1500] %Rs=[0.89        0.89] XHL=5.8 %Noloadloss=0 %imag=0 MaxTap=1.05 MinTap=0.95 NumTaps=4
New Transformer.T_221_EBU2_LAB Windings=2 Buses=[EBU2_LAB_PRI EBU2_LAB] Conns=[delta wye] kVs=[12.47         0.48] kVAs=[2500  3500] %Rs=[0.72        0.72] XHL=5.77 %Noloadloss=0 %imag=0 MaxTap=1.05 MinTap=0.95 NumTaps=4
New Transformer.T_223_BIRCH_AQ Windings=2 Buses=[BUS_T_223_PRI BIRCH_AQUARIUM] Conns=[delta wye] kVs=[12.47         0.48] kVAs=[750  1000] %Rs=[1.09        1.09] XHL=5.7 %Noloadloss=0 %imag=0 MaxTap=1.05 MinTap=0.95 NumTaps=4
New Transformer.T_224_SVERDRUP_US1 Windings=2 Buses=[SVERD_US1_PRI SVERDRUP_US1] Conns=[delta wye] kVs=[12.47        0.208] kVAs=[750  1000] %Rs=[1.05        1.05] XHL=5.5 %Noloadloss=0 %imag=0 MaxTap=1.05 MinTap=0.95 NumTaps=4
New Transformer.T_234_US_TD Windings=2 Buses=[BUS_T_234_PRI DB_CP] Conns=[delta wye] kVs=[12.47         4.16] kVAs=[2500  2500] %Rs=[0.51        0.51] XHL=5.38 %Noloadloss=0 %imag=0 MaxTap=1.05 MinTap=0.95 NumTaps=4
New Transformer.T_238_CENT_HALL Windings=2 Buses=[BUS_T_238_PRI CENT_HALL] Conns=[delta wye] kVs=[12.47         0.48] kVAs=[750  750] %Rs=[1.05        1.05] XHL=5.51 %Noloadloss=0 %imag=0 MaxTap=1.05 MinTap=0.95 NumTaps=4
New Transformer.T_246_SERF_BLDG Windings=2 Buses=[SERF_BLDG_PRI SERF_BLDG] Conns=[delta wye] kVs=[12.47         0.48] kVAs=[2000  2667] %Rs=[0.76        0.76] XHL=6.1 %Noloadloss=0 %imag=0 MaxTap=1.05 MinTap=0.95 NumTaps=4
New Transformer.T_257_DANCE_STUDIO Windings=2 Buses=[BUS_T_257_PRI DANCE_STUDIO] Conns=[delta wye] kVs=[12.47        0.208] kVAs=[300  300] %Rs=[0.76        0.76] XHL=3.15 %Noloadloss=0 %imag=0 MaxTap=1.05 MinTap=0.95 NumTaps=4
New Transformer.T_259 Windings=2 Buses=[BUS_T_259_PRI T_259_SEC] Conns=[delta wye] kVs=[4.16       0.208] kVAs=[150  150] %Rs=[1.06        1.06] XHL=3.8 %Noloadloss=0 %imag=0 MaxTap=1.05 MinTap=0.95 NumTaps=4
New Transformer.T_268_GALBRAITH Windings=2 Buses=[SW_T_095 GALBRAITH_HALL] Conns=[delta wye] kVs=[12.47         0.48] kVAs=[1500  2000] %Rs=[0.85        0.85] XHL=5.56 %Noloadloss=0 %imag=0 MaxTap=1.05 MinTap=0.95 NumTaps=4
New Transformer.T_270_REGENTS Windings=2 Buses=[T_270_PRI T_270_SEC] Conns=[delta wye] kVs=[12.47         0.48] kVAs=[75  75] %Rs=[1.26        1.26] XHL=3.79 %Noloadloss=0 %imag=0 MaxTap=1.05 MinTap=0.95 NumTaps=4
New Transformer.T_277 Windings=2 Buses=[SDG&E_69KV T_277_SEC] Conns=[delta wye] kVs=[69        12.47] kVAs=[16800  28000] %Rs=[0.36        0.36] XHL=7.43 %Noloadloss=0 %imag=0 MaxTap=1.05 MinTap=0.95 NumTaps=16
New Transformer.T_281_GILMAN Windings=2 Buses=[T_281_PRI GILMAN_PARKING] Conns=[delta wye] kVs=[12.47         0.48] kVAs=[750  840] %Rs=[1.09        1.09] XHL=5.7 %Noloadloss=0 %imag=0 MaxTap=1.05 MinTap=0.95 NumTaps=4
New Transformer.T_283_PREUSS Windings=2 Buses=[BUS_T_287_PRI PREUSS_SCHOOL] Conns=[delta wye] kVs=[12.47         0.48] kVAs=[1000  1000] %Rs=[1.03        1.03] XHL=5.86 %Noloadloss=0 %imag=0 MaxTap=1.05 MinTap=0.95 NumTaps=4
New Transformer.T_284_NC_PARKING Windings=2 Buses=[BUS_T_284_PRI NC_PARKING_480] Conns=[delta wye] kVs=[12.47         0.48] kVAs=[500  500] %Rs=[1.33        1.33] XHL=6.26 %Noloadloss=0 %imag=0 MaxTap=1.05 MinTap=0.95 NumTaps=4
New Transformer.T_305 Windings=2 Buses=[T_305_PRI EC_OFFICE_BLDG] Conns=[delta wye] kVs=[12.47         0.48] kVAs=[1000  1000] %Rs=[0.99        0.99] XHL=5.66 %Noloadloss=0 %imag=0 MaxTap=1.05 MinTap=0.95 NumTaps=4
New Transformer.T_306_SHILEY Windings=2 Buses=[PRI_T_306_SHILEY SHILEY_EYE_CTR] Conns=[delta wye] kVs=[12.47         0.48] kVAs=[1000  1150] %Rs=[1.01        1.01] XHL=5.77 %Noloadloss=0 %imag=0 MaxTap=1.05 MinTap=0.95 NumTaps=4
New Transformer.T_318_MULTIP_BLD Windings=2 Buses=[BUS_T_318_PRI MULT_BLD_SEC] Conns=[delta wye] kVs=[12.47         0.48] kVAs=[750  1000] %Rs=[1.03        1.03] XHL=5.4 %Noloadloss=0 %imag=0 MaxTap=1.05 MinTap=0.95 NumTaps=4
New Transformer.T_320_LA_JOLLA Windings=2 Buses=[BLACK_BOX_PRI LA_JOLLA_PLAY] Conns=[delta wye] kVs=[12.47         0.48] kVAs=[1500  1500] %Rs=[0.88        0.88] XHL=5.75 %Noloadloss=0 %imag=0 MaxTap=1.05 MinTap=0.95 NumTaps=4
New Transformer.T_326 Windings=2 Buses=[BUS_T_326_PRI T_326_SEC] Conns=[delta wye] kVs=[12.47         0.48] kVAs=[500  500] %Rs=[0.98        0.98] XHL=4.62 %Noloadloss=0 %imag=0 MaxTap=1.05 MinTap=0.95 NumTaps=4
New Transformer.T_331_ESA_PHARMA Windings=2 Buses=[T_PHARM_ESA_P PHARM_ESA] Conns=[delta wye] kVs=[12.47         0.48] kVAs=[1000  1150] %Rs=[0.99        0.99] XHL=5.64 %Noloadloss=0 %imag=0 MaxTap=1.05 MinTap=0.95 NumTaps=4
New Transformer.T_334_BIO_MED Windings=2 Buses=[PRI_BIO_MED BIO_MED_SEC] Conns=[delta wye] kVs=[12.47         0.48] kVAs=[1500  2000] %Rs=[0.87        0.87] XHL=5.71 %Noloadloss=0 %imag=0 MaxTap=1.05 MinTap=0.95 NumTaps=4
New Transformer.T_341_STUD_ACAD Windings=2 Buses=[T_341_PRI STUD_ACAD] Conns=[delta wye] kVs=[12.47         0.48] kVAs=[1500  2000] %Rs=[0.88        0.88] XHL=5.78 %Noloadloss=0 %imag=0 MaxTap=1.05 MinTap=0.95 NumTaps=4
New Transformer.T_347_US_2 Windings=2 Buses=[BUS_T_347_PRI US_2_HOPKINS] Conns=[delta wye] kVs=[12.47         0.48] kVAs=[1500  1725] %Rs=[0.83        0.83] XHL=5.45 %Noloadloss=0 %imag=0 MaxTap=1.05 MinTap=0.95 NumTaps=4
New Transformer.T_349_BIRCH_AQ Windings=2 Buses=[BUS_T_349_PRI BIRCH_AQ] Conns=[delta wye] kVs=[12.47         0.48] kVAs=[1500  1725] %Rs=[0.87        0.87] XHL=5.66 %Noloadloss=0 %imag=0 MaxTap=1.05 MinTap=0.95 NumTaps=4
New Transformer.T_350 Windings=2 Buses=[BUS_T_350_PRI USS_A] Conns=[delta wye] kVs=[12.47         0.48] kVAs=[2000  2667] %Rs=[0.78        0.78] XHL=5.72 %Noloadloss=0 %imag=0 MaxTap=1.05 MinTap=0.95 NumTaps=4
New Transformer.T_351 Windings=2 Buses=[BUS_T_351_PRI USS_B] Conns=[delta wye] kVs=[12.47         0.48] kVAs=[1500  2000] %Rs=[0.84        0.84] XHL=5.52 %Noloadloss=0 %imag=0 MaxTap=1.05 MinTap=0.95 NumTaps=4
New Transformer.T_352_PRICE_CEN Windings=2 Buses=[BUS_T_352_PRI USS_C_PC] Conns=[delta wye] kVs=[12.47         0.48] kVAs=[750  750] %Rs=[1.09        1.09] XHL=5.72 %Noloadloss=0 %imag=0 MaxTap=1.05 MinTap=0.95 NumTaps=4
New Transformer.T_358_CPB Windings=2 Buses=[T_050 US_CPB] Conns=[delta wye] kVs=[12.47         0.48] kVAs=[2500  3333] %Rs=[0.55        0.55] XHL=5.79 %Noloadloss=0 %imag=0 MaxTap=1.05 MinTap=0.95 NumTaps=4
New Transformer.T_79_CMRR Windings=2 Buses=[BUS_T_79_PRI CMRR] Conns=[delta wye] kVs=[12.47         0.48] kVAs=[750  750] %Rs=[1.1         1.1] XHL=5.77 %Noloadloss=0 %imag=0 MaxTap=1.05 MinTap=0.95 NumTaps=4
New Transformer.EV_ECUP Phases=3 Windings=2 Buses=[T_270_PRI EV_ECUP] Conns=[delta delta] kVs=[12.47        0.208] kVAs=[75  75] %Rs=[1.08        1.08] XHL=3.23 %Noloadloss=0 %imag=0 MaxTap=1.05 MinTap=0.95 NumTaps=4
New Transformer.EV_HOPKINS_PS Phases=3 Windings=2 Buses=[BUS_T_347_PRI EV_HOPKINS_PS] Conns=[delta delta] kVs=[12.47        0.208] kVAs=[75  75] %Rs=[1.08        1.08] XHL=3.23 %Noloadloss=0 %imag=0 MaxTap=1.05 MinTap=0.95 NumTaps=4
New Transformer.EV_GILMAN_PS Phases=3 Windings=2 Buses=[T_281_PRI EV_GILMAN_PS] Conns=[delta delta] kVs=[12.47        0.208] kVAs=[75  75] %Rs=[1.08        1.08] XHL=3.23 %Noloadloss=0 %imag=0 MaxTap=1.05 MinTap=0.95 NumTaps=4
New Transformer.EV_CAROLINES_P001 Phases=3 Windings=2 Buses=[SS_52_SIO EV_CAROLINES_P001] Conns=[delta delta] kVs=[12.47        0.208] kVAs=[75  75] %Rs=[1.08        1.08] XHL=3.23 %Noloadloss=0 %imag=0 MaxTap=1.05 MinTap=0.95 NumTaps=4
New Transformer.EV_PD Phases=3 Windings=2 Buses=[C_SERVICE_PRI EV_PD] Conns=[delta delta] kVs=[12.47        0.208] kVAs=[75  75] %Rs=[1.08        1.08] XHL=3.23 %Noloadloss=0 %imag=0 MaxTap=1.05 MinTap=0.95 NumTaps=4
New Transformer.EV_RADY Phases=3 Windings=2 Buses=[BUS_T_345_PRI EV_RADY] Conns=[delta delta] kVs=[12.47        0.208] kVAs=[75  75] %Rs=[1.08        1.08] XHL=3.23 %Noloadloss=0 %imag=0 MaxTap=1.05 MinTap=0.95 NumTaps=4
New Regcontrol.FEEDER_REG204 transformer=T_204 winding=2 vreg=126 band=2 ptratio=60
New Regcontrol.FEEDER_REG205 transformer=T_205 winding=2 vreg=126 band=2 ptratio=60
New Regcontrol.FEEDER_REG277 transformer=T_277 winding=2 vreg=126 band=2 ptratio=60
New Pvsystem.PV_T_171_SEC.1 phases=1 bus1=T_171_SEC.1 kv=0.28 irradiance=1 Pmpp=95.7 kvar=0 kVA=95.7 %cutin=0 %cutout=0
New Pvsystem.PV_T_171_SEC.2 phases=1 bus1=T_171_SEC.2 kv=0.28 irradiance=1 Pmpp=95.7 kvar=0 kVA=95.7 %cutin=0 %cutout=0
New Pvsystem.PV_T_171_SEC.3 phases=1 bus1=T_171_SEC.3 kv=0.28 irradiance=1 Pmpp=95.7 kvar=0 kVA=95.7 %cutin=0 %cutout=0
New Pvsystem.PV_EBU2_LAB.1 phases=1 bus1=EBU2_LAB.1 kv=0.28 irradiance=1 Pmpp=26.7867 kvar=0 kVA=26.7867 %cutin=0 %cutout=0
New Pvsystem.PV_EBU2_LAB.2 phases=1 bus1=EBU2_LAB.2 kv=0.28 irradiance=1 Pmpp=26.7867 kvar=0 kVA=26.7867 %cutin=0 %cutout=0
New Pvsystem.PV_EBU2_LAB.3 phases=1 bus1=EBU2_LAB.3 kv=0.28 irradiance=1 Pmpp=26.7867 kvar=0 kVA=26.7867 %cutin=0 %cutout=0
New Pvsystem.PV_BIRCH_AQUARIUM.1 phases=1 bus1=BIRCH_AQUARIUM.1 kv=0.28 irradiance=1 Pmpp=3.28 kvar=0 kVA=3.28 %cutin=0 %cutout=0
New Pvsystem.PV_BIRCH_AQUARIUM.2 phases=1 bus1=BIRCH_AQUARIUM.2 kv=0.28 irradiance=1 Pmpp=3.28 kvar=0 kVA=3.28 %cutin=0 %cutout=0
New Pvsystem.PV_BIRCH_AQUARIUM.3 phases=1 bus1=BIRCH_AQUARIUM.3 kv=0.28 irradiance=1 Pmpp=3.28 kvar=0 kVA=3.28 %cutin=0 %cutout=0
New Pvsystem.PV_T_270_SEC.1 phases=1 bus1=T_270_SEC.1 kv=0.28 irradiance=1 Pmpp=9.5667 kvar=0 kVA=9.5667 %cutin=0 %cutout=0
New Pvsystem.PV_T_270_SEC.2 phases=1 bus1=T_270_SEC.2 kv=0.28 irradiance=1 Pmpp=9.5667 kvar=0 kVA=9.5667 %cutin=0 %cutout=0
New Pvsystem.PV_T_270_SEC.3 phases=1 bus1=T_270_SEC.3 kv=0.28 irradiance=1 Pmpp=9.5667 kvar=0 kVA=9.5667 %cutin=0 %cutout=0
New Pvsystem.PV_GILMAN_PARKING.1 phases=1 bus1=GILMAN_PARKING.1 kv=0.28 irradiance=1 Pmpp=64.9867 kvar=0 kVA=64.9867 %cutin=0 %cutout=0
New Pvsystem.PV_GILMAN_PARKING.2 phases=1 bus1=GILMAN_PARKING.2 kv=0.28 irradiance=1 Pmpp=64.9867 kvar=0 kVA=64.9867 %cutin=0 %cutout=0
New Pvsystem.PV_GILMAN_PARKING.3 phases=1 bus1=GILMAN_PARKING.3 kv=0.28 irradiance=1 Pmpp=64.9867 kvar=0 kVA=64.9867 %cutin=0 %cutout=0
New Pvsystem.PV_US_2_HOPKINS.1 phases=1 bus1=US_2_HOPKINS.1 kv=0.28 irradiance=1 Pmpp=112.6667 kvar=0 kVA=112.6667 %cutin=0 %cutout=0
New Pvsystem.PV_US_2_HOPKINS.2 phases=1 bus1=US_2_HOPKINS.2 kv=0.28 irradiance=1 Pmpp=112.6667 kvar=0 kVA=112.6667 %cutin=0 %cutout=0
New Pvsystem.PV_US_2_HOPKINS.3 phases=1 bus1=US_2_HOPKINS.3 kv=0.28 irradiance=1 Pmpp=112.6667 kvar=0 kVA=112.6667 %cutin=0 %cutout=0
New Pvsystem.PV_BIRCH_AQ.1 phases=1 bus1=BIRCH_AQ.1 kv=0.28 irradiance=1 Pmpp=13.12 kvar=0 kVA=13.12 %cutin=0 %cutout=0
New Pvsystem.PV_BIRCH_AQ.2 phases=1 bus1=BIRCH_AQ.2 kv=0.28 irradiance=1 Pmpp=13.12 kvar=0 kVA=13.12 %cutin=0 %cutout=0
New Pvsystem.PV_BIRCH_AQ.3 phases=1 bus1=BIRCH_AQ.3 kv=0.28 irradiance=1 Pmpp=13.12 kvar=0 kVA=13.12 %cutin=0 %cutout=0
New Pvsystem.PV_USS_A.1 phases=1 bus1=USS_A.1 kv=0.28 irradiance=1 Pmpp=43.0467 kvar=0 kVA=43.0467 %cutin=0 %cutout=0
New Pvsystem.PV_USS_A.2 phases=1 bus1=USS_A.2 kv=0.28 irradiance=1 Pmpp=43.0467 kvar=0 kVA=43.0467 %cutin=0 %cutout=0
New Pvsystem.PV_USS_A.3 phases=1 bus1=USS_A.3 kv=0.28 irradiance=1 Pmpp=43.0467 kvar=0 kVA=43.0467 %cutin=0 %cutout=0
New Pvsystem.PV_USS_B.1 phases=1 bus1=USS_B.1 kv=0.28 irradiance=1 Pmpp=15.3 kvar=0 kVA=15.3 %cutin=0 %cutout=0
New Pvsystem.PV_USS_B.2 phases=1 bus1=USS_B.2 kv=0.28 irradiance=1 Pmpp=15.3 kvar=0 kVA=15.3 %cutin=0 %cutout=0
New Pvsystem.PV_USS_B.3 phases=1 bus1=USS_B.3 kv=0.28 irradiance=1 Pmpp=15.3 kvar=0 kVA=15.3 %cutin=0 %cutout=0
New Pvsystem.PV_USS_C_PC.1 phases=1 bus1=USS_C_PC.1 kv=0.28 irradiance=1 Pmpp=10.5233 kvar=0 kVA=10.5233 %cutin=0 %cutout=0
New Pvsystem.PV_USS_C_PC.2 phases=1 bus1=USS_C_PC.2 kv=0.28 irradiance=1 Pmpp=10.5233 kvar=0 kVA=10.5233 %cutin=0 %cutout=0
New Pvsystem.PV_USS_C_PC.3 phases=1 bus1=USS_C_PC.3 kv=0.28 irradiance=1 Pmpp=10.5233 kvar=0 kVA=10.5233 %cutin=0 %cutout=0
New Load.Load_MCSS_MB.1_model_1 Phases=1 bus1=MCSS_MB.1 Kv=7.2 Kw=666.74 Model=1 Kvar=500.055
New Load.Load_MCSS_MB.2_model_1 Phases=1 bus1=MCSS_MB.2 Kv=7.2 Kw=666.74 Model=1 Kvar=500.055
New Load.Load_MCSS_MB.3_model_1 Phases=1 bus1=MCSS_MB.3 Kv=7.2 Kw=666.74 Model=1 Kvar=500.055
New Load.Load_MCSS_MA.1_model_1 Phases=1 bus1=MCSS_MA.1 Kv=7.2 Kw=471.8686 Model=1 Kvar=354.0514
New Load.Load_MCSS_MA.2_model_1 Phases=1 bus1=MCSS_MA.2 Kv=7.2 Kw=471.8686 Model=1 Kvar=354.0514
New Load.Load_MCSS_MA.3_model_1 Phases=1 bus1=MCSS_MA.3 Kv=7.2 Kw=471.8686 Model=1 Kvar=354.0514
New Load.Load_MCSS_MC.1_model_1 Phases=1 bus1=MCSS_MC.1 Kv=7.2 Kw=75.674 Model=1 Kvar=56.7555
New Load.Load_MCSS_MC.2_model_1 Phases=1 bus1=MCSS_MC.2 Kv=7.2 Kw=75.674 Model=1 Kvar=56.7555
New Load.Load_MCSS_MC.3_model_1 Phases=1 bus1=MCSS_MC.3 Kv=7.2 Kw=75.674 Model=1 Kvar=56.7555
New Load.Load_EAST_CAMPUS_1.1_model_1 Phases=1 bus1=EAST_CAMPUS_1.1 Kv=7.2 Kw=30 Model=1 Kvar=22.5
New Load.Load_EAST_CAMPUS_1.2_model_1 Phases=1 bus1=EAST_CAMPUS_1.2 Kv=7.2 Kw=30 Model=1 Kvar=22.5
New Load.Load_EAST_CAMPUS_1.3_model_1 Phases=1 bus1=EAST_CAMPUS_1.3 Kv=7.2 Kw=30 Model=1 Kvar=22.5
New Load.Load_PSB.1_model_1 Phases=1 bus1=PSB.1 Kv=7.2 Kw=86.9487 Model=1 Kvar=65.2115
New Load.Load_PSB.2_model_1 Phases=1 bus1=PSB.2 Kv=7.2 Kw=86.9487 Model=1 Kvar=65.2115
New Load.Load_PSB.3_model_1 Phases=1 bus1=PSB.3 Kv=7.2 Kw=86.9487 Model=1 Kvar=65.2115
New Load.Load_PRI_BIO_MED.1_model_1 Phases=1 bus1=PRI_BIO_MED.1 Kv=7.2 Kw=408.037 Model=1 Kvar=306.0278
New Load.Load_PRI_BIO_MED.2_model_1 Phases=1 bus1=PRI_BIO_MED.2 Kv=7.2 Kw=408.037 Model=1 Kvar=306.0278
New Load.Load_PRI_BIO_MED.3_model_1 Phases=1 bus1=PRI_BIO_MED.3 Kv=7.2 Kw=408.037 Model=1 Kvar=306.0278
New Load.Load_SS_64_SIO.1_model_1 Phases=1 bus1=SS_64_SIO.1 Kv=7.2 Kw=134.7191 Model=1 Kvar=94.6639
New Load.Load_SS_64_SIO.2_model_1 Phases=1 bus1=SS_64_SIO.2 Kv=7.2 Kw=134.7191 Model=1 Kvar=94.6639
New Load.Load_SS_64_SIO.3_model_1 Phases=1 bus1=SS_64_SIO.3 Kv=7.2 Kw=134.7191 Model=1 Kvar=94.6639
New Load.Load_BLACK_BOX_PRI.1_model_1 Phases=1 bus1=BLACK_BOX_PRI.1 Kv=7.2 Kw=166.5877 Model=1 Kvar=124.9408
New Load.Load_BLACK_BOX_PRI.2_model_1 Phases=1 bus1=BLACK_BOX_PRI.2 Kv=7.2 Kw=166.5877 Model=1 Kvar=124.9408
New Load.Load_BLACK_BOX_PRI.3_model_1 Phases=1 bus1=BLACK_BOX_PRI.3 Kv=7.2 Kw=166.5877 Model=1 Kvar=124.9408
New Load.Load_BLDG_3B_12KV.1_model_1 Phases=1 bus1=BLDG_3B_12KV.1 Kv=7.2 Kw=217.022 Model=1 Kvar=162.7665
New Load.Load_BLDG_3B_12KV.2_model_1 Phases=1 bus1=BLDG_3B_12KV.2 Kv=7.2 Kw=217.022 Model=1 Kvar=162.7665
New Load.Load_BLDG_3B_12KV.3_model_1 Phases=1 bus1=BLDG_3B_12KV.3 Kv=7.2 Kw=217.022 Model=1 Kvar=162.7665
New Load.Load_BLDG_3B_15.1_model_1 Phases=1 bus1=BLDG_3B_15.1 Kv=7.2 Kw=105.674 Model=1 Kvar=79.2555
New Load.Load_BLDG_3B_15.2_model_1 Phases=1 bus1=BLDG_3B_15.2 Kv=7.2 Kw=105.674 Model=1 Kvar=79.2555
New Load.Load_BLDG_3B_15.3_model_1 Phases=1 bus1=BLDG_3B_15.3 Kv=7.2 Kw=105.674 Model=1 Kvar=79.2555
New Load.Load_SS_36_RC.1_model_1 Phases=1 bus1=SS_36_RC.1 Kv=7.2 Kw=273.0656 Model=1 Kvar=204.7992
New Load.Load_SS_36_RC.2_model_1 Phases=1 bus1=SS_36_RC.2 Kv=7.2 Kw=273.0656 Model=1 Kvar=204.7992
New Load.Load_SS_36_RC.3_model_1 Phases=1 bus1=SS_36_RC.3 Kv=7.2 Kw=273.0656 Model=1 Kvar=204.7992
New Load.Load_N_CAMPUS_B.1_model_1 Phases=1 bus1=N_CAMPUS_B.1 Kv=7.2 Kw=306.2272 Model=1 Kvar=229.6704
New Load.Load_N_CAMPUS_B.2_model_1 Phases=1 bus1=N_CAMPUS_B.2 Kv=7.2 Kw=306.2272 Model=1 Kvar=229.6704
New Load.Load_N_CAMPUS_B.3_model_1 Phases=1 bus1=N_CAMPUS_B.3 Kv=7.2 Kw=306.2272 Model=1 Kvar=229.6704
New Load.Load_N_CAMPUS_C.1_model_1 Phases=1 bus1=N_CAMPUS_C.1 Kv=7.2 Kw=131.348 Model=1 Kvar=98.511
New Load.Load_N_CAMPUS_C.2_model_1 Phases=1 bus1=N_CAMPUS_C.2 Kv=7.2 Kw=131.348 Model=1 Kvar=98.511
New Load.Load_N_CAMPUS_C.3_model_1 Phases=1 bus1=N_CAMPUS_C.3 Kv=7.2 Kw=131.348 Model=1 Kvar=98.511
New Load.Load_BUS_NC17.1_model_1 Phases=1 bus1=BUS_NC17.1 Kv=7.2 Kw=2.0992 Model=1 Kvar=1.5744
New Load.Load_BUS_NC17.2_model_1 Phases=1 bus1=BUS_NC17.2 Kv=7.2 Kw=2.0992 Model=1 Kvar=1.5744
New Load.Load_BUS_NC17.3_model_1 Phases=1 bus1=BUS_NC17.3 Kv=7.2 Kw=2.0992 Model=1 Kvar=1.5744
New Load.Load_N_CAMPUS_A.1_model_1 Phases=1 bus1=N_CAMPUS_A.1 Kv=7.2 Kw=144.3404 Model=1 Kvar=108.2553
New Load.Load_N_CAMPUS_A.2_model_1 Phases=1 bus1=N_CAMPUS_A.2 Kv=7.2 Kw=144.3404 Model=1 Kvar=108.2553
New Load.Load_N_CAMPUS_A.3_model_1 Phases=1 bus1=N_CAMPUS_A.3 Kv=7.2 Kw=144.3404 Model=1 Kvar=108.2553
New Load.Load_BUS_T_238_PRI.1_model_1 Phases=1 bus1=BUS_T_238_PRI.1 Kv=7.2 Kw=112.6447 Model=1 Kvar=84.4835
New Load.Load_BUS_T_238_PRI.2_model_1 Phases=1 bus1=BUS_T_238_PRI.2 Kv=7.2 Kw=112.6447 Model=1 Kvar=84.4835
New Load.Load_BUS_T_238_PRI.3_model_1 Phases=1 bus1=BUS_T_238_PRI.3 Kv=7.2 Kw=112.6447 Model=1 Kvar=84.4835
New Load.Load_REVELLE_2.1_model_1 Phases=1 bus1=REVELLE_2.1 Kv=7.2 Kw=851.8108 Model=1 Kvar=638.8582
New Load.Load_REVELLE_2.2_model_1 Phases=1 bus1=REVELLE_2.2 Kv=7.2 Kw=851.8108 Model=1 Kvar=638.8582
New Load.Load_REVELLE_2.3_model_1 Phases=1 bus1=REVELLE_2.3 Kv=7.2 Kw=851.8108 Model=1 Kvar=638.8582
New Load.Load_REVELLE_1.1_model_1 Phases=1 bus1=REVELLE_1.1 Kv=7.2 Kw=708.421 Model=1 Kvar=531.3157
New Load.Load_REVELLE_1.2_model_1 Phases=1 bus1=REVELLE_1.2 Kv=7.2 Kw=708.421 Model=1 Kvar=531.3157
New Load.Load_REVELLE_1.3_model_1 Phases=1 bus1=REVELLE_1.3 Kv=7.2 Kw=708.421 Model=1 Kvar=531.3157
New Load.Load_E_1_5_11.1_model_1 Phases=1 bus1=E_1_5_11.1 Kv=7.2 Kw=72.5592 Model=1 Kvar=54.4194
New Load.Load_E_1_5_11.2_model_1 Phases=1 bus1=E_1_5_11.2 Kv=7.2 Kw=72.5592 Model=1 Kvar=54.4194
New Load.Load_E_1_5_11.3_model_1 Phases=1 bus1=E_1_5_11.3 Kv=7.2 Kw=72.5592 Model=1 Kvar=54.4194
New Load.Load_E_1_9_2_305.1_model_1 Phases=1 bus1=E_1_9_2_305.1 Kv=7.2 Kw=35.7466 Model=1 Kvar=26.81
New Load.Load_E_1_9_2_305.2_model_1 Phases=1 bus1=E_1_9_2_305.2 Kv=7.2 Kw=35.7466 Model=1 Kvar=26.81
New Load.Load_E_1_9_2_305.3_model_1 Phases=1 bus1=E_1_9_2_305.3 Kv=7.2 Kw=35.7466 Model=1 Kvar=26.81
New Load.Load_E_1_7_8.1_model_1 Phases=1 bus1=E_1_7_8.1 Kv=7.2 Kw=150.0513 Model=1 Kvar=112.5385
New Load.Load_E_1_7_8.2_model_1 Phases=1 bus1=E_1_7_8.2 Kv=7.2 Kw=150.0513 Model=1 Kvar=112.5385
New Load.Load_E_1_7_8.3_model_1 Phases=1 bus1=E_1_7_8.3 Kv=7.2 Kw=150.0513 Model=1 Kvar=112.5385
New Load.Load_E_1_9_11.1_model_1 Phases=1 bus1=E_1_9_11.1 Kv=7.2 Kw=131.348 Model=1 Kvar=98.511
New Load.Load_E_1_9_11.2_model_1 Phases=1 bus1=E_1_9_11.2 Kv=7.2 Kw=131.348 Model=1 Kvar=98.511
New Load.Load_E_1_9_11.3_model_1 Phases=1 bus1=E_1_9_11.3 Kv=7.2 Kw=131.348 Model=1 Kvar=98.511
New Load.Load_E_1_9_8.1_model_1 Phases=1 bus1=E_1_9_8.1 Kv=7.2 Kw=43.1829 Model=1 Kvar=32.3872
New Load.Load_E_1_9_8.2_model_1 Phases=1 bus1=E_1_9_8.2 Kv=7.2 Kw=43.1829 Model=1 Kvar=32.3872
New Load.Load_E_1_9_8.3_model_1 Phases=1 bus1=E_1_9_8.3 Kv=7.2 Kw=43.1829 Model=1 Kvar=32.3872
New Load.Load_E_10_10_202.1_model_1 Phases=1 bus1=E_10_10_202.1 Kv=7.2 Kw=193.6509 Model=1 Kvar=151.6136
New Load.Load_E_10_10_202.2_model_1 Phases=1 bus1=E_10_10_202.2 Kv=7.2 Kw=193.6509 Model=1 Kvar=151.6136
New Load.Load_E_10_10_202.3_model_1 Phases=1 bus1=E_10_10_202.3 Kv=7.2 Kw=193.6509 Model=1 Kvar=151.6136
New Load.Load_E_10_11_14_109.1_model_1 Phases=1 bus1=E_10_11_14_109.1 Kv=7.2 Kw=17.564 Model=1 Kvar=13.173
New Load.Load_E_10_11_14_109.2_model_1 Phases=1 bus1=E_10_11_14_109.2 Kv=7.2 Kw=17.564 Model=1 Kvar=13.173
New Load.Load_E_10_11_14_109.3_model_1 Phases=1 bus1=E_10_11_14_109.3 Kv=7.2 Kw=17.564 Model=1 Kvar=13.173
New Load.Load_SIO_2_SUB.1_model_1 Phases=1 bus1=SIO_2_SUB.1 Kv=7.2 Kw=284.4927 Model=1 Kvar=211.8911
New Load.Load_SIO_2_SUB.2_model_1 Phases=1 bus1=SIO_2_SUB.2 Kv=7.2 Kw=284.4927 Model=1 Kvar=211.8911
New Load.Load_SIO_2_SUB.3_model_1 Phases=1 bus1=SIO_2_SUB.3 Kv=7.2 Kw=284.4927 Model=1 Kvar=211.8911
New Load.Load_SIO_1_SUB.1_model_1 Phases=1 bus1=SIO_1_SUB.1 Kv=7.2 Kw=243.3121 Model=1 Kvar=183.2801
New Load.Load_SIO_1_SUB.2_model_1 Phases=1 bus1=SIO_1_SUB.2 Kv=7.2 Kw=243.3121 Model=1 Kvar=183.2801
New Load.Load_SIO_1_SUB.3_model_1 Phases=1 bus1=SIO_1_SUB.3 Kv=7.2 Kw=243.3121 Model=1 Kvar=183.2801
New Load.Load_SS_83_MC_15.1_model_1 Phases=1 bus1=SS_83_MC_15.1 Kv=7.2 Kw=117.9853 Model=1 Kvar=88.489
New Load.Load_SS_83_MC_15.2_model_1 Phases=1 bus1=SS_83_MC_15.2 Kv=7.2 Kw=117.9853 Model=1 Kvar=88.489
New Load.Load_SS_83_MC_15.3_model_1 Phases=1 bus1=SS_83_MC_15.3 Kv=7.2 Kw=117.9853 Model=1 Kvar=88.489
New Load.Load_E_2_6_12.1_model_1 Phases=1 bus1=E_2_6_12.1 Kv=7.2 Kw=98.511 Model=1 Kvar=73.8832
New Load.Load_E_2_6_12.2_model_1 Phases=1 bus1=E_2_6_12.2 Kv=7.2 Kw=98.511 Model=1 Kvar=73.8832
New Load.Load_E_2_6_12.3_model_1 Phases=1 bus1=E_2_6_12.3 Kv=7.2 Kw=98.511 Model=1 Kvar=73.8832
New Load.Load_E_2_9_15.1_model_1 Phases=1 bus1=E_2_9_15.1 Kv=7.2 Kw=86.0443 Model=1 Kvar=64.5332
New Load.Load_E_2_9_15.2_model_1 Phases=1 bus1=E_2_9_15.2 Kv=7.2 Kw=86.0443 Model=1 Kvar=64.5332
New Load.Load_E_2_9_15.3_model_1 Phases=1 bus1=E_2_9_15.3 Kv=7.2 Kw=86.0443 Model=1 Kvar=64.5332
New Load.Load_EAST_CAMPUS_3.1_model_1 Phases=1 bus1=EAST_CAMPUS_3.1 Kv=7.2 Kw=292.696 Model=1 Kvar=219.5221
New Load.Load_EAST_CAMPUS_3.2_model_1 Phases=1 bus1=EAST_CAMPUS_3.2 Kv=7.2 Kw=292.696 Model=1 Kvar=219.5221
New Load.Load_EAST_CAMPUS_3.3_model_1 Phases=1 bus1=EAST_CAMPUS_3.3 Kv=7.2 Kw=292.696 Model=1 Kvar=219.5221
New Load.Load_E_5_5_436.1_model_1 Phases=1 bus1=E_5_5_436.1 Kv=7.2 Kw=69.2588 Model=1 Kvar=51.9441
New Load.Load_E_5_5_436.2_model_1 Phases=1 bus1=E_5_5_436.2 Kv=7.2 Kw=69.2588 Model=1 Kvar=51.9441
New Load.Load_E_5_5_436.3_model_1 Phases=1 bus1=E_5_5_436.3 Kv=7.2 Kw=69.2588 Model=1 Kvar=51.9441
New Load.Load_E_7_1_7.1_model_1 Phases=1 bus1=E_7_1_7.1 Kv=7.2 Kw=41.8527 Model=1 Kvar=31.3895
New Load.Load_E_7_1_7.2_model_1 Phases=1 bus1=E_7_1_7.2 Kv=7.2 Kw=41.8527 Model=1 Kvar=31.3895
New Load.Load_E_7_1_7.3_model_1 Phases=1 bus1=E_7_1_7.3 Kv=7.2 Kw=41.8527 Model=1 Kvar=31.3895
New Load.Load_E_7_11_17.1_model_1 Phases=1 bus1=E_7_11_17.1 Kv=7.2 Kw=106.1237 Model=1 Kvar=79.5928
New Load.Load_E_7_11_17.2_model_1 Phases=1 bus1=E_7_11_17.2 Kv=7.2 Kw=106.1237 Model=1 Kvar=79.5928
New Load.Load_E_7_11_17.3_model_1 Phases=1 bus1=E_7_11_17.3 Kv=7.2 Kw=106.1237 Model=1 Kvar=79.5928
New Load.Load_E_7_17_17.1_model_1 Phases=1 bus1=E_7_17_17.1 Kv=7.2 Kw=85.5557 Model=1 Kvar=64.1668
New Load.Load_E_7_17_17.2_model_1 Phases=1 bus1=E_7_17_17.2 Kv=7.2 Kw=85.5557 Model=1 Kvar=64.1668
New Load.Load_E_7_17_17.3_model_1 Phases=1 bus1=E_7_17_17.3 Kv=7.2 Kw=85.5557 Model=1 Kvar=64.1668
New Load.Load_E_7_19_17.1_model_1 Phases=1 bus1=E_7_19_17.1 Kv=7.2 Kw=502.2538 Model=1 Kvar=385.7431
New Load.Load_E_7_19_17.2_model_1 Phases=1 bus1=E_7_19_17.2 Kv=7.2 Kw=502.2538 Model=1 Kvar=385.7431
New Load.Load_E_7_19_17.3_model_1 Phases=1 bus1=E_7_19_17.3 Kv=7.2 Kw=502.2538 Model=1 Kvar=385.7431
New Load.Load_SS_42_WC.1_model_1 Phases=1 bus1=SS_42_WC.1 Kv=7.2 Kw=22.4911 Model=1 Kvar=16.8683
New Load.Load_SS_42_WC.2_model_1 Phases=1 bus1=SS_42_WC.2 Kv=7.2 Kw=22.4911 Model=1 Kvar=16.8683
New Load.Load_SS_42_WC.3_model_1 Phases=1 bus1=SS_42_WC.3 Kv=7.2 Kw=22.4911 Model=1 Kvar=16.8683
New Load.Load_EBU2_LAB_PRI.1_model_1 Phases=1 bus1=EBU2_LAB_PRI.1 Kv=7.2 Kw=63.5748 Model=1 Kvar=47.6811
New Load.Load_EBU2_LAB_PRI.2_model_1 Phases=1 bus1=EBU2_LAB_PRI.2 Kv=7.2 Kw=63.5748 Model=1 Kvar=47.6811
New Load.Load_EBU2_LAB_PRI.3_model_1 Phases=1 bus1=EBU2_LAB_PRI.3 Kv=7.2 Kw=63.5748 Model=1 Kvar=47.6811
New Load.Load_SW_T_095.1_model_1 Phases=1 bus1=SW_T_095.1 Kv=7.2 Kw=120.5523 Model=1 Kvar=90.4142
New Load.Load_SW_T_095.2_model_1 Phases=1 bus1=SW_T_095.2 Kv=7.2 Kw=120.5523 Model=1 Kvar=90.4142
New Load.Load_SW_T_095.3_model_1 Phases=1 bus1=SW_T_095.3 Kv=7.2 Kw=120.5523 Model=1 Kvar=90.4142
New Load.Load_PSA.1_model_1 Phases=1 bus1=PSA.1 Kv=7.2 Kw=394.044 Model=1 Kvar=295.533
New Load.Load_PSA.2_model_1 Phases=1 bus1=PSA.2 Kv=7.2 Kw=394.044 Model=1 Kvar=295.533
New Load.Load_PSA.3_model_1 Phases=1 bus1=PSA.3 Kv=7.2 Kw=394.044 Model=1 Kvar=295.533
New Load.Load_BUS_T_179_PRI.1_model_1 Phases=1 bus1=BUS_T_179_PRI.1 Kv=7.2 Kw=55.0089 Model=1 Kvar=32.2039
New Load.Load_BUS_T_179_PRI.2_model_1 Phases=1 bus1=BUS_T_179_PRI.2 Kv=7.2 Kw=55.0089 Model=1 Kvar=32.2039
New Load.Load_BUS_T_179_PRI.3_model_1 Phases=1 bus1=BUS_T_179_PRI.3 Kv=7.2 Kw=55.0089 Model=1 Kvar=32.2039
New Load.Load_BUS_T_345_PRI.1_model_1 Phases=1 bus1=BUS_T_345_PRI.1 Kv=7.2 Kw=513.5213 Model=1 Kvar=385.141
New Load.Load_BUS_T_345_PRI.2_model_1 Phases=1 bus1=BUS_T_345_PRI.2 Kv=7.2 Kw=513.5213 Model=1 Kvar=385.141
New Load.Load_BUS_T_345_PRI.3_model_1 Phases=1 bus1=BUS_T_345_PRI.3 Kv=7.2 Kw=513.5213 Model=1 Kvar=385.141
New Load.Load_SS_31_RC.1_model_1 Phases=1 bus1=SS_31_RC.1 Kv=7.2 Kw=252.3264 Model=1 Kvar=189.2448
New Load.Load_SS_31_RC.2_model_1 Phases=1 bus1=SS_31_RC.2 Kv=7.2 Kw=252.3264 Model=1 Kvar=189.2448
New Load.Load_SS_31_RC.3_model_1 Phases=1 bus1=SS_31_RC.3 Kv=7.2 Kw=252.3264 Model=1 Kvar=189.2448
New Load.Load_SS_30_RC.1_model_1 Phases=1 bus1=SS_30_RC.1 Kv=7.2 Kw=536.1877 Model=1 Kvar=402.1408
New Load.Load_SS_30_RC.2_model_1 Phases=1 bus1=SS_30_RC.2 Kv=7.2 Kw=536.1877 Model=1 Kvar=402.1408
New Load.Load_SS_30_RC.3_model_1 Phases=1 bus1=SS_30_RC.3 Kv=7.2 Kw=536.1877 Model=1 Kvar=402.1408
New Load.Load_SB_B2A.1_model_1 Phases=1 bus1=SB_B2A.1 Kv=7.2 Kw=699.577 Model=1 Kvar=524.6827
New Load.Load_SB_B2A.2_model_1 Phases=1 bus1=SB_B2A.2 Kv=7.2 Kw=699.577 Model=1 Kvar=524.6827
New Load.Load_SB_B2A.3_model_1 Phases=1 bus1=SB_B2A.3 Kv=7.2 Kw=699.577 Model=1 Kvar=524.6827
New Load.Load_SS_52_SIO.1_model_1 Phases=1 bus1=SS_52_SIO.1 Kv=7.2 Kw=172.4608 Model=1 Kvar=128.5496
New Load.Load_SS_52_SIO.2_model_1 Phases=1 bus1=SS_52_SIO.2 Kv=7.2 Kw=172.4608 Model=1 Kvar=128.5496
New Load.Load_SS_52_SIO.3_model_1 Phases=1 bus1=SS_52_SIO.3 Kv=7.2 Kw=172.4608 Model=1 Kvar=128.5496
New Load.Load_SS_82_WC.1_model_1 Phases=1 bus1=SS_82_WC.1 Kv=7.2 Kw=262.696 Model=1 Kvar=197.022
New Load.Load_SS_82_WC.2_model_1 Phases=1 bus1=SS_82_WC.2 Kv=7.2 Kw=262.696 Model=1 Kvar=197.022
New Load.Load_SS_82_WC.3_model_1 Phases=1 bus1=SS_82_WC.3 Kv=7.2 Kw=262.696 Model=1 Kvar=197.022
New Load.Load_SS_91_WC.1_model_1 Phases=1 bus1=SS_91_WC.1 Kv=7.2 Kw=197.022 Model=1 Kvar=147.7665
New Load.Load_SS_91_WC.2_model_1 Phases=1 bus1=SS_91_WC.2 Kv=7.2 Kw=197.022 Model=1 Kvar=147.7665
New Load.Load_SS_91_WC.3_model_1 Phases=1 bus1=SS_91_WC.3 Kv=7.2 Kw=197.022 Model=1 Kvar=147.7665
New Load.Load_SS_92_ERC.1_model_1 Phases=1 bus1=SS_92_ERC.1 Kv=7.2 Kw=131.348 Model=1 Kvar=98.511
New Load.Load_SS_92_ERC.2_model_1 Phases=1 bus1=SS_92_ERC.2 Kv=7.2 Kw=131.348 Model=1 Kvar=98.511
New Load.Load_SS_92_ERC.3_model_1 Phases=1 bus1=SS_92_ERC.3 Kv=7.2 Kw=131.348 Model=1 Kvar=98.511
New Load.Load_SVERD_US1_PRI.1_model_1 Phases=1 bus1=SVERD_US1_PRI.1 Kv=7.2 Kw=175.2253 Model=1 Kvar=132.8974
New Load.Load_SVERD_US1_PRI.2_model_1 Phases=1 bus1=SVERD_US1_PRI.2 Kv=7.2 Kw=175.2253 Model=1 Kvar=132.8974
New Load.Load_SVERD_US1_PRI.3_model_1 Phases=1 bus1=SVERD_US1_PRI.3 Kv=7.2 Kw=175.2253 Model=1 Kvar=132.8974
New Load.Load_T_050.1_model_1 Phases=1 bus1=T_050.1 Kv=7.2 Kw=63.5234 Model=1 Kvar=47.4926
New Load.Load_T_050.2_model_1 Phases=1 bus1=T_050.2 Kv=7.2 Kw=63.5234 Model=1 Kvar=47.4926
New Load.Load_T_050.3_model_1 Phases=1 bus1=T_050.3 Kv=7.2 Kw=63.5234 Model=1 Kvar=47.4926
New Load.Load_C_SERVICE_PRI.1_model_1 Phases=1 bus1=C_SERVICE_PRI.1 Kv=7.2 Kw=155.1693 Model=1 Kvar=116.377
New Load.Load_C_SERVICE_PRI.2_model_1 Phases=1 bus1=C_SERVICE_PRI.2 Kv=7.2 Kw=155.1693 Model=1 Kvar=116.377
New Load.Load_C_SERVICE_PRI.3_model_1 Phases=1 bus1=C_SERVICE_PRI.3 Kv=7.2 Kw=155.1693 Model=1 Kvar=116.377
New Load.Load_SW_T_071/072.1_model_1 Phases=1 bus1=SW_T_071/072.1 Kv=7.2 Kw=62.5467 Model=1 Kvar=46.91
New Load.Load_SW_T_071/072.2_model_1 Phases=1 bus1=SW_T_071/072.2 Kv=7.2 Kw=62.5467 Model=1 Kvar=46.91
New Load.Load_SW_T_071/072.3_model_1 Phases=1 bus1=SW_T_071/072.3 Kv=7.2 Kw=62.5467 Model=1 Kvar=46.91
New Load.Load_BUS_T_234_PRI.1_model_1 Phases=1 bus1=BUS_T_234_PRI.1 Kv=7.2 Kw=44.3993 Model=1 Kvar=33.2995
New Load.Load_BUS_T_234_PRI.2_model_1 Phases=1 bus1=BUS_T_234_PRI.2 Kv=7.2 Kw=44.3993 Model=1 Kvar=33.2995
New Load.Load_BUS_T_234_PRI.3_model_1 Phases=1 bus1=BUS_T_234_PRI.3 Kv=7.2 Kw=44.3993 Model=1 Kvar=33.2995
New Load.Load_DB_CP.1_model_1 Phases=1 bus1=DB_CP.1 Kv=2.4 Kw=378.779 Model=1 Kvar=284.0843
New Load.Load_DB_CP.2_model_1 Phases=1 bus1=DB_CP.2 Kv=2.4 Kw=378.779 Model=1 Kvar=284.0843
New Load.Load_DB_CP.3_model_1 Phases=1 bus1=DB_CP.3 Kv=2.4 Kw=378.779 Model=1 Kvar=284.0843
New Load.Load_BUS_T_257_PRI.1_model_1 Phases=1 bus1=BUS_T_257_PRI.1 Kv=7.2 Kw=48.11 Model=1 Kvar=36.0825
New Load.Load_BUS_T_257_PRI.2_model_1 Phases=1 bus1=BUS_T_257_PRI.2 Kv=7.2 Kw=48.11 Model=1 Kvar=36.0825
New Load.Load_BUS_T_257_PRI.3_model_1 Phases=1 bus1=BUS_T_257_PRI.3 Kv=7.2 Kw=48.11 Model=1 Kvar=36.0825
New Load.Load_BUS_T_259_PRI.1_model_1 Phases=1 bus1=BUS_T_259_PRI.1 Kv=2.4 Kw=29.591 Model=1 Kvar=22.1933
New Load.Load_BUS_T_259_PRI.2_model_1 Phases=1 bus1=BUS_T_259_PRI.2 Kv=2.4 Kw=29.591 Model=1 Kvar=22.1933
New Load.Load_BUS_T_259_PRI.3_model_1 Phases=1 bus1=BUS_T_259_PRI.3 Kv=2.4 Kw=29.591 Model=1 Kvar=22.1933
New Load.Load_T_270_PRI.1_model_1 Phases=1 bus1=T_270_PRI.1 Kv=7.2 Kw=192.7155 Model=1 Kvar=144.5366
New Load.Load_T_270_PRI.2_model_1 Phases=1 bus1=T_270_PRI.2 Kv=7.2 Kw=192.7155 Model=1 Kvar=144.5366
New Load.Load_T_270_PRI.3_model_1 Phases=1 bus1=T_270_PRI.3 Kv=7.2 Kw=192.7155 Model=1 Kvar=144.5366
New Load.Load_T_281_PRI.1_model_1 Phases=1 bus1=T_281_PRI.1 Kv=7.2 Kw=98.0731 Model=1 Kvar=73.5548
New Load.Load_T_281_PRI.2_model_1 Phases=1 bus1=T_281_PRI.2 Kv=7.2 Kw=98.0731 Model=1 Kvar=73.5548
New Load.Load_T_281_PRI.3_model_1 Phases=1 bus1=T_281_PRI.3 Kv=7.2 Kw=98.0731 Model=1 Kvar=73.5548
New Load.Load_BUS_T_284_PRI.1_model_1 Phases=1 bus1=BUS_T_284_PRI.1 Kv=7.2 Kw=108.6633 Model=1 Kvar=81.4975
New Load.Load_BUS_T_284_PRI.2_model_1 Phases=1 bus1=BUS_T_284_PRI.2 Kv=7.2 Kw=108.6633 Model=1 Kvar=81.4975
New Load.Load_BUS_T_284_PRI.3_model_1 Phases=1 bus1=BUS_T_284_PRI.3 Kv=7.2 Kw=108.6633 Model=1 Kvar=81.4975
New Load.Load_PRI_T_306_SHILEY.1_model_1 Phases=1 bus1=PRI_T_306_SHILEY.1 Kv=7.2 Kw=66.3957 Model=1 Kvar=49.7968
New Load.Load_PRI_T_306_SHILEY.2_model_1 Phases=1 bus1=PRI_T_306_SHILEY.2 Kv=7.2 Kw=66.3957 Model=1 Kvar=49.7968
New Load.Load_PRI_T_306_SHILEY.3_model_1 Phases=1 bus1=PRI_T_306_SHILEY.3 Kv=7.2 Kw=66.3957 Model=1 Kvar=49.7968
New Load.Load_BUS_T_318_PRI.1_model_1 Phases=1 bus1=BUS_T_318_PRI.1 Kv=7.2 Kw=29.9274 Model=1 Kvar=22.4455
New Load.Load_BUS_T_318_PRI.2_model_1 Phases=1 bus1=BUS_T_318_PRI.2 Kv=7.2 Kw=29.9274 Model=1 Kvar=22.4455
New Load.Load_BUS_T_318_PRI.3_model_1 Phases=1 bus1=BUS_T_318_PRI.3 Kv=7.2 Kw=29.9274 Model=1 Kvar=22.4455
New Load.Load_T_PHARM_ESA_P.1_model_1 Phases=1 bus1=T_PHARM_ESA_P.1 Kv=7.2 Kw=207.6785 Model=1 Kvar=155.7589
New Load.Load_T_PHARM_ESA_P.2_model_1 Phases=1 bus1=T_PHARM_ESA_P.2 Kv=7.2 Kw=207.6785 Model=1 Kvar=155.7589
New Load.Load_T_PHARM_ESA_P.3_model_1 Phases=1 bus1=T_PHARM_ESA_P.3 Kv=7.2 Kw=207.6785 Model=1 Kvar=155.7589
New Load.Load_T_341_PRI.1_model_1 Phases=1 bus1=T_341_PRI.1 Kv=7.2 Kw=3.1148 Model=1 Kvar=2.3361
New Load.Load_T_341_PRI.2_model_1 Phases=1 bus1=T_341_PRI.2 Kv=7.2 Kw=3.1148 Model=1 Kvar=2.3361
New Load.Load_T_341_PRI.3_model_1 Phases=1 bus1=T_341_PRI.3 Kv=7.2 Kw=3.1148 Model=1 Kvar=2.3361
New Load.Load_BUS_T_347_PRI.1_model_1 Phases=1 bus1=BUS_T_347_PRI.1 Kv=7.2 Kw=222.2463 Model=1 Kvar=166.6847
New Load.Load_BUS_T_347_PRI.2_model_1 Phases=1 bus1=BUS_T_347_PRI.2 Kv=7.2 Kw=222.2463 Model=1 Kvar=166.6847
New Load.Load_BUS_T_347_PRI.3_model_1 Phases=1 bus1=BUS_T_347_PRI.3 Kv=7.2 Kw=222.2463 Model=1 Kvar=166.6847
New Load.Load_HEALTH_CENTER.1_model_1 Phases=1 bus1=HEALTH_CENTER.1 Kv=0.12 Kw=10 Model=1 Kvar=7.5
New Load.Load_HEALTH_CENTER.2_model_1 Phases=1 bus1=HEALTH_CENTER.2 Kv=0.12 Kw=10 Model=1 Kvar=7.5
New Load.Load_HEALTH_CENTER.3_model_1 Phases=1 bus1=HEALTH_CENTER.3 Kv=0.12 Kw=10 Model=1 Kvar=7.5
New Load.Load_CRB_3B.1_model_1 Phases=1 bus1=CRB_3B.1 Kv=0.28 Kw=65.674 Model=1 Kvar=49.2555
New Load.Load_CRB_3B.2_model_1 Phases=1 bus1=CRB_3B.2 Kv=0.28 Kw=65.674 Model=1 Kvar=49.2555
New Load.Load_CRB_3B.3_model_1 Phases=1 bus1=CRB_3B.3 Kv=0.28 Kw=65.674 Model=1 Kvar=49.2555
New Load.Load_HUBBS_HALL.1_model_1 Phases=1 bus1=HUBBS_HALL.1 Kv=0.28 Kw=65.674 Model=1 Kvar=49.2555
New Load.Load_HUBBS_HALL.2_model_1 Phases=1 bus1=HUBBS_HALL.2 Kv=0.28 Kw=65.674 Model=1 Kvar=49.2555
New Load.Load_HUBBS_HALL.3_model_1 Phases=1 bus1=HUBBS_HALL.3 Kv=0.28 Kw=65.674 Model=1 Kvar=49.2555
New Load.Load_FACULTY_CLUB.1_model_1 Phases=1 bus1=FACULTY_CLUB.1 Kv=0.12 Kw=65.674 Model=1 Kvar=49.2555
New Load.Load_FACULTY_CLUB.2_model_1 Phases=1 bus1=FACULTY_CLUB.2 Kv=0.12 Kw=65.674 Model=1 Kvar=49.2555
New Load.Load_FACULTY_CLUB.3_model_1 Phases=1 bus1=FACULTY_CLUB.3 Kv=0.12 Kw=65.674 Model=1 Kvar=49.2555
New Load.Load_POWELL_STRUCT.1_model_1 Phases=1 bus1=POWELL_STRUCT.1 Kv=0.28 Kw=65.674 Model=1 Kvar=49.2555
New Load.Load_POWELL_STRUCT.2_model_1 Phases=1 bus1=POWELL_STRUCT.2 Kv=0.28 Kw=65.674 Model=1 Kvar=49.2555
New Load.Load_POWELL_STRUCT.3_model_1 Phases=1 bus1=POWELL_STRUCT.3 Kv=0.28 Kw=65.674 Model=1 Kvar=49.2555
New Load.Load_T_137_SEC_EBU1.1_model_1 Phases=1 bus1=T_137_SEC_EBU1.1 Kv=0.28 Kw=65.674 Model=1 Kvar=49.2555
New Load.Load_T_137_SEC_EBU1.2_model_1 Phases=1 bus1=T_137_SEC_EBU1.2 Kv=0.28 Kw=65.674 Model=1 Kvar=49.2555
New Load.Load_T_137_SEC_EBU1.3_model_1 Phases=1 bus1=T_137_SEC_EBU1.3 Kv=0.28 Kw=65.674 Model=1 Kvar=49.2555
New Load.Load_EBU1_T_138.1_model_1 Phases=1 bus1=EBU1_T_138.1 Kv=0.28 Kw=65.674 Model=1 Kvar=49.2555
New Load.Load_EBU1_T_138.2_model_1 Phases=1 bus1=EBU1_T_138.2 Kv=0.28 Kw=65.674 Model=1 Kvar=49.2555
New Load.Load_EBU1_T_138.3_model_1 Phases=1 bus1=EBU1_T_138.3 Kv=0.28 Kw=65.674 Model=1 Kvar=49.2555
New Load.Load_PHYS_ED_BLDGS.1_model_1 Phases=1 bus1=PHYS_ED_BLDGS.1 Kv=0.28 Kw=65.674 Model=1 Kvar=49.2555
New Load.Load_PHYS_ED_BLDGS.2_model_1 Phases=1 bus1=PHYS_ED_BLDGS.2 Kv=0.28 Kw=65.674 Model=1 Kvar=49.2555
New Load.Load_PHYS_ED_BLDGS.3_model_1 Phases=1 bus1=PHYS_ED_BLDGS.3 Kv=0.28 Kw=65.674 Model=1 Kvar=49.2555
New Load.Load_T_171_SEC.1_model_1 Phases=1 bus1=T_171_SEC.1 Kv=0.28 Kw=65.674 Model=1 Kvar=49.2555
New Load.Load_T_171_SEC.2_model_1 Phases=1 bus1=T_171_SEC.2 Kv=0.28 Kw=65.674 Model=1 Kvar=49.2555
New Load.Load_T_171_SEC.3_model_1 Phases=1 bus1=T_171_SEC.3 Kv=0.28 Kw=65.674 Model=1 Kvar=49.2555
New Load.Load_T_179_OCEANVIEW_SEC.1_model_1 Phases=1 bus1=T_179_OCEANVIEW_SEC.1 Kv=0.12 Kw=10 Model=1 Kvar=7.5
New Load.Load_T_179_OCEANVIEW_SEC.2_model_1 Phases=1 bus1=T_179_OCEANVIEW_SEC.2 Kv=0.12 Kw=10 Model=1 Kvar=7.5
New Load.Load_T_179_OCEANVIEW_SEC.3_model_1 Phases=1 bus1=T_179_OCEANVIEW_SEC.3 Kv=0.12 Kw=10 Model=1 Kvar=7.5
New Load.Load_HI_BAY_PHYSICS.1_model_1 Phases=1 bus1=HI_BAY_PHYSICS.1 Kv=0.28 Kw=65.674 Model=1 Kvar=49.2555
New Load.Load_HI_BAY_PHYSICS.2_model_1 Phases=1 bus1=HI_BAY_PHYSICS.2 Kv=0.28 Kw=65.674 Model=1 Kvar=49.2555
New Load.Load_HI_BAY_PHYSICS.3_model_1 Phases=1 bus1=HI_BAY_PHYSICS.3 Kv=0.28 Kw=65.674 Model=1 Kvar=49.2555
New Load.Load_MANDEVILLE_CTR.1_model_1 Phases=1 bus1=MANDEVILLE_CTR.1 Kv=0.28 Kw=65.674 Model=1 Kvar=49.2555
New Load.Load_MANDEVILLE_CTR.2_model_1 Phases=1 bus1=MANDEVILLE_CTR.2 Kv=0.28 Kw=65.674 Model=1 Kvar=49.2555
New Load.Load_MANDEVILLE_CTR.3_model_1 Phases=1 bus1=MANDEVILLE_CTR.3 Kv=0.28 Kw=65.674 Model=1 Kvar=49.2555
New Load.Load_IGPP_SUB.1_model_1 Phases=1 bus1=IGPP_SUB.1 Kv=0.28 Kw=65.674 Model=1 Kvar=49.2555
New Load.Load_IGPP_SUB.2_model_1 Phases=1 bus1=IGPP_SUB.2 Kv=0.28 Kw=65.674 Model=1 Kvar=49.2555
New Load.Load_IGPP_SUB.3_model_1 Phases=1 bus1=IGPP_SUB.3 Kv=0.28 Kw=65.674 Model=1 Kvar=49.2555
New Load.Load_VISUAL_ARTS.1_model_1 Phases=1 bus1=VISUAL_ARTS.1 Kv=0.28 Kw=65.674 Model=1 Kvar=49.2555
New Load.Load_VISUAL_ARTS.2_model_1 Phases=1 bus1=VISUAL_ARTS.2 Kv=0.28 Kw=65.674 Model=1 Kvar=49.2555
New Load.Load_VISUAL_ARTS.3_model_1 Phases=1 bus1=VISUAL_ARTS.3 Kv=0.28 Kw=65.674 Model=1 Kvar=49.2555
New Load.Load_US_2_RIMAC.1_model_1 Phases=1 bus1=US_2_RIMAC.1 Kv=0.28 Kw=65.674 Model=1 Kvar=49.2555
New Load.Load_US_2_RIMAC.2_model_1 Phases=1 bus1=US_2_RIMAC.2 Kv=0.28 Kw=65.674 Model=1 Kvar=49.2555
New Load.Load_US_2_RIMAC.3_model_1 Phases=1 bus1=US_2_RIMAC.3 Kv=0.28 Kw=65.674 Model=1 Kvar=49.2555
New Load.Load_EBU2_LAB.1_model_1 Phases=1 bus1=EBU2_LAB.1 Kv=0.28 Kw=65.674 Model=1 Kvar=49.2555
New Load.Load_EBU2_LAB.2_model_1 Phases=1 bus1=EBU2_LAB.2 Kv=0.28 Kw=65.674 Model=1 Kvar=49.2555
New Load.Load_EBU2_LAB.3_model_1 Phases=1 bus1=EBU2_LAB.3 Kv=0.28 Kw=65.674 Model=1 Kvar=49.2555
New Load.Load_BIRCH_AQUARIUM.1_model_1 Phases=1 bus1=BIRCH_AQUARIUM.1 Kv=0.28 Kw=65.674 Model=1 Kvar=49.2555
New Load.Load_BIRCH_AQUARIUM.2_model_1 Phases=1 bus1=BIRCH_AQUARIUM.2 Kv=0.28 Kw=65.674 Model=1 Kvar=49.2555
New Load.Load_BIRCH_AQUARIUM.3_model_1 Phases=1 bus1=BIRCH_AQUARIUM.3 Kv=0.28 Kw=65.674 Model=1 Kvar=49.2555
New Load.Load_SVERDRUP_US1.1_model_1 Phases=1 bus1=SVERDRUP_US1.1 Kv=0.12 Kw=65.674 Model=1 Kvar=49.2555
New Load.Load_SVERDRUP_US1.2_model_1 Phases=1 bus1=SVERDRUP_US1.2 Kv=0.12 Kw=65.674 Model=1 Kvar=49.2555
New Load.Load_SVERDRUP_US1.3_model_1 Phases=1 bus1=SVERDRUP_US1.3 Kv=0.12 Kw=65.674 Model=1 Kvar=49.2555
New Load.Load_CENT_HALL.1_model_1 Phases=1 bus1=CENT_HALL.1 Kv=0.28 Kw=65.674 Model=1 Kvar=49.2555
New Load.Load_CENT_HALL.2_model_1 Phases=1 bus1=CENT_HALL.2 Kv=0.28 Kw=65.674 Model=1 Kvar=49.2555
New Load.Load_CENT_HALL.3_model_1 Phases=1 bus1=CENT_HALL.3 Kv=0.28 Kw=65.674 Model=1 Kvar=49.2555
New Load.Load_SERF_BLDG.1_model_1 Phases=1 bus1=SERF_BLDG.1 Kv=0.28 Kw=65.674 Model=1 Kvar=49.2555
New Load.Load_SERF_BLDG.2_model_1 Phases=1 bus1=SERF_BLDG.2 Kv=0.28 Kw=65.674 Model=1 Kvar=49.2555
New Load.Load_SERF_BLDG.3_model_1 Phases=1 bus1=SERF_BLDG.3 Kv=0.28 Kw=65.674 Model=1 Kvar=49.2555
New Load.Load_DANCE_STUDIO.1_model_1 Phases=1 bus1=DANCE_STUDIO.1 Kv=0.12 Kw=65.674 Model=1 Kvar=49.2555
New Load.Load_DANCE_STUDIO.2_model_1 Phases=1 bus1=DANCE_STUDIO.2 Kv=0.12 Kw=65.674 Model=1 Kvar=49.2555
New Load.Load_DANCE_STUDIO.3_model_1 Phases=1 bus1=DANCE_STUDIO.3 Kv=0.12 Kw=65.674 Model=1 Kvar=49.2555
New Load.Load_T_259_SEC.1_model_1 Phases=1 bus1=T_259_SEC.1 Kv=0.12 Kw=10 Model=1 Kvar=7.5
New Load.Load_T_259_SEC.2_model_1 Phases=1 bus1=T_259_SEC.2 Kv=0.12 Kw=10 Model=1 Kvar=7.5
New Load.Load_T_259_SEC.3_model_1 Phases=1 bus1=T_259_SEC.3 Kv=0.12 Kw=10 Model=1 Kvar=7.5
New Load.Load_GALBRAITH_HALL.1_model_1 Phases=1 bus1=GALBRAITH_HALL.1 Kv=0.28 Kw=65.674 Model=1 Kvar=49.2555
New Load.Load_GALBRAITH_HALL.2_model_1 Phases=1 bus1=GALBRAITH_HALL.2 Kv=0.28 Kw=65.674 Model=1 Kvar=49.2555
New Load.Load_GALBRAITH_HALL.3_model_1 Phases=1 bus1=GALBRAITH_HALL.3 Kv=0.28 Kw=65.674 Model=1 Kvar=49.2555
New Load.Load_T_270_SEC.1_model_1 Phases=1 bus1=T_270_SEC.1 Kv=0.28 Kw=10 Model=1 Kvar=7.5
New Load.Load_T_270_SEC.2_model_1 Phases=1 bus1=T_270_SEC.2 Kv=0.28 Kw=10 Model=1 Kvar=7.5
New Load.Load_T_270_SEC.3_model_1 Phases=1 bus1=T_270_SEC.3 Kv=0.28 Kw=10 Model=1 Kvar=7.5
New Load.Load_GILMAN_PARKING.1_model_1 Phases=1 bus1=GILMAN_PARKING.1 Kv=0.28 Kw=65.674 Model=1 Kvar=49.2555
New Load.Load_GILMAN_PARKING.2_model_1 Phases=1 bus1=GILMAN_PARKING.2 Kv=0.28 Kw=65.674 Model=1 Kvar=49.2555
New Load.Load_GILMAN_PARKING.3_model_1 Phases=1 bus1=GILMAN_PARKING.3 Kv=0.28 Kw=65.674 Model=1 Kvar=49.2555
New Load.Load_PREUSS_SCHOOL.1_model_1 Phases=1 bus1=PREUSS_SCHOOL.1 Kv=0.28 Kw=65.674 Model=1 Kvar=49.2555
New Load.Load_PREUSS_SCHOOL.2_model_1 Phases=1 bus1=PREUSS_SCHOOL.2 Kv=0.28 Kw=65.674 Model=1 Kvar=49.2555
New Load.Load_PREUSS_SCHOOL.3_model_1 Phases=1 bus1=PREUSS_SCHOOL.3 Kv=0.28 Kw=65.674 Model=1 Kvar=49.2555
New Load.Load_NC_PARKING_480.1_model_1 Phases=1 bus1=NC_PARKING_480.1 Kv=0.28 Kw=65.674 Model=1 Kvar=49.2555
New Load.Load_NC_PARKING_480.2_model_1 Phases=1 bus1=NC_PARKING_480.2 Kv=0.28 Kw=65.674 Model=1 Kvar=49.2555
New Load.Load_NC_PARKING_480.3_model_1 Phases=1 bus1=NC_PARKING_480.3 Kv=0.28 Kw=65.674 Model=1 Kvar=49.2555
New Load.Load_EC_OFFICE_BLDG.1_model_1 Phases=1 bus1=EC_OFFICE_BLDG.1 Kv=0.28 Kw=65.674 Model=1 Kvar=49.2555
New Load.Load_EC_OFFICE_BLDG.2_model_1 Phases=1 bus1=EC_OFFICE_BLDG.2 Kv=0.28 Kw=65.674 Model=1 Kvar=49.2555
New Load.Load_EC_OFFICE_BLDG.3_model_1 Phases=1 bus1=EC_OFFICE_BLDG.3 Kv=0.28 Kw=65.674 Model=1 Kvar=49.2555
New Load.Load_SHILEY_EYE_CTR.1_model_1 Phases=1 bus1=SHILEY_EYE_CTR.1 Kv=0.28 Kw=65.674 Model=1 Kvar=49.2555
New Load.Load_SHILEY_EYE_CTR.2_model_1 Phases=1 bus1=SHILEY_EYE_CTR.2 Kv=0.28 Kw=65.674 Model=1 Kvar=49.2555
New Load.Load_SHILEY_EYE_CTR.3_model_1 Phases=1 bus1=SHILEY_EYE_CTR.3 Kv=0.28 Kw=65.674 Model=1 Kvar=49.2555
New Load.Load_MULT_BLD_SEC.1_model_1 Phases=1 bus1=MULT_BLD_SEC.1 Kv=0.28 Kw=65.674 Model=1 Kvar=49.2555
New Load.Load_MULT_BLD_SEC.2_model_1 Phases=1 bus1=MULT_BLD_SEC.2 Kv=0.28 Kw=65.674 Model=1 Kvar=49.2555
New Load.Load_MULT_BLD_SEC.3_model_1 Phases=1 bus1=MULT_BLD_SEC.3 Kv=0.28 Kw=65.674 Model=1 Kvar=49.2555
New Load.Load_LA_JOLLA_PLAY.1_model_1 Phases=1 bus1=LA_JOLLA_PLAY.1 Kv=0.28 Kw=65.674 Model=1 Kvar=49.2555
New Load.Load_LA_JOLLA_PLAY.2_model_1 Phases=1 bus1=LA_JOLLA_PLAY.2 Kv=0.28 Kw=65.674 Model=1 Kvar=49.2555
New Load.Load_LA_JOLLA_PLAY.3_model_1 Phases=1 bus1=LA_JOLLA_PLAY.3 Kv=0.28 Kw=65.674 Model=1 Kvar=49.2555
New Load.Load_T_326_SEC.1_model_1 Phases=1 bus1=T_326_SEC.1 Kv=0.28 Kw=65.674 Model=1 Kvar=49.2555
New Load.Load_T_326_SEC.2_model_1 Phases=1 bus1=T_326_SEC.2 Kv=0.28 Kw=65.674 Model=1 Kvar=49.2555
New Load.Load_T_326_SEC.3_model_1 Phases=1 bus1=T_326_SEC.3 Kv=0.28 Kw=65.674 Model=1 Kvar=49.2555
New Load.Load_PHARM_ESA.1_model_1 Phases=1 bus1=PHARM_ESA.1 Kv=0.28 Kw=65.674 Model=1 Kvar=49.2555
New Load.Load_PHARM_ESA.2_model_1 Phases=1 bus1=PHARM_ESA.2 Kv=0.28 Kw=65.674 Model=1 Kvar=49.2555
New Load.Load_PHARM_ESA.3_model_1 Phases=1 bus1=PHARM_ESA.3 Kv=0.28 Kw=65.674 Model=1 Kvar=49.2555
New Load.Load_BIO_MED_SEC.1_model_1 Phases=1 bus1=BIO_MED_SEC.1 Kv=0.28 Kw=65.674 Model=1 Kvar=49.2555
New Load.Load_BIO_MED_SEC.2_model_1 Phases=1 bus1=BIO_MED_SEC.2 Kv=0.28 Kw=65.674 Model=1 Kvar=49.2555
New Load.Load_BIO_MED_SEC.3_model_1 Phases=1 bus1=BIO_MED_SEC.3 Kv=0.28 Kw=65.674 Model=1 Kvar=49.2555
New Load.Load_STUD_ACAD.1_model_1 Phases=1 bus1=STUD_ACAD.1 Kv=0.28 Kw=65.674 Model=1 Kvar=49.2555
New Load.Load_STUD_ACAD.2_model_1 Phases=1 bus1=STUD_ACAD.2 Kv=0.28 Kw=65.674 Model=1 Kvar=49.2555
New Load.Load_STUD_ACAD.3_model_1 Phases=1 bus1=STUD_ACAD.3 Kv=0.28 Kw=65.674 Model=1 Kvar=49.2555
New Load.Load_US_2_HOPKINS.1_model_1 Phases=1 bus1=US_2_HOPKINS.1 Kv=0.28 Kw=65.674 Model=1 Kvar=49.2555
New Load.Load_US_2_HOPKINS.2_model_1 Phases=1 bus1=US_2_HOPKINS.2 Kv=0.28 Kw=65.674 Model=1 Kvar=49.2555
New Load.Load_US_2_HOPKINS.3_model_1 Phases=1 bus1=US_2_HOPKINS.3 Kv=0.28 Kw=65.674 Model=1 Kvar=49.2555
New Load.Load_BIRCH_AQ.1_model_1 Phases=1 bus1=BIRCH_AQ.1 Kv=0.28 Kw=65.674 Model=1 Kvar=49.2555
New Load.Load_BIRCH_AQ.2_model_1 Phases=1 bus1=BIRCH_AQ.2 Kv=0.28 Kw=65.674 Model=1 Kvar=49.2555
New Load.Load_BIRCH_AQ.3_model_1 Phases=1 bus1=BIRCH_AQ.3 Kv=0.28 Kw=65.674 Model=1 Kvar=49.2555
New Load.Load_USS_A.1_model_1 Phases=1 bus1=USS_A.1 Kv=0.28 Kw=65.674 Model=1 Kvar=49.2555
New Load.Load_USS_A.2_model_1 Phases=1 bus1=USS_A.2 Kv=0.28 Kw=65.674 Model=1 Kvar=49.2555
New Load.Load_USS_A.3_model_1 Phases=1 bus1=USS_A.3 Kv=0.28 Kw=65.674 Model=1 Kvar=49.2555
New Load.Load_USS_B.1_model_1 Phases=1 bus1=USS_B.1 Kv=0.28 Kw=65.674 Model=1 Kvar=49.2555
New Load.Load_USS_B.2_model_1 Phases=1 bus1=USS_B.2 Kv=0.28 Kw=65.674 Model=1 Kvar=49.2555
New Load.Load_USS_B.3_model_1 Phases=1 bus1=USS_B.3 Kv=0.28 Kw=65.674 Model=1 Kvar=49.2555
New Load.Load_USS_C_PC.1_model_1 Phases=1 bus1=USS_C_PC.1 Kv=0.28 Kw=65.674 Model=1 Kvar=49.2555
New Load.Load_USS_C_PC.2_model_1 Phases=1 bus1=USS_C_PC.2 Kv=0.28 Kw=65.674 Model=1 Kvar=49.2555
New Load.Load_USS_C_PC.3_model_1 Phases=1 bus1=USS_C_PC.3 Kv=0.28 Kw=65.674 Model=1 Kvar=49.2555
New Load.Load_US_CPB.1_model_1 Phases=1 bus1=US_CPB.1 Kv=0.28 Kw=65.674 Model=1 Kvar=49.2555
New Load.Load_US_CPB.2_model_1 Phases=1 bus1=US_CPB.2 Kv=0.28 Kw=65.674 Model=1 Kvar=49.2555
New Load.Load_US_CPB.3_model_1 Phases=1 bus1=US_CPB.3 Kv=0.28 Kw=65.674 Model=1 Kvar=49.2555
New Load.Load_CMRR.1_model_1 Phases=1 bus1=CMRR.1 Kv=0.28 Kw=65.674 Model=1 Kvar=49.2555
New Load.Load_CMRR.2_model_1 Phases=1 bus1=CMRR.2 Kv=0.28 Kw=65.674 Model=1 Kvar=49.2555
New Load.Load_CMRR.3_model_1 Phases=1 bus1=CMRR.3 Kv=0.28 Kw=65.674 Model=1 Kvar=49.2555
New Generator.Gen_SG1_BUS.1_model_1 Phases=1 bus1=SG1_BUS.1 Kv=7.2 Kw=1000 Model=1 Kvar=539.7428
New Generator.Gen_SG1_BUS.2_model_1 Phases=1 bus1=SG1_BUS.2 Kv=7.2 Kw=1000 Model=1 Kvar=539.7428
New Generator.Gen_SG1_BUS.3_model_1 Phases=1 bus1=SG1_BUS.3 Kv=7.2 Kw=1000 Model=1 Kvar=539.7428
New Generator.Gen_PSB.1_model_1 Phases=1 bus1=PSB.1 Kv=7.2 Kw=5100 Model=1 Kvar=2752.6884
New Generator.Gen_PSB.2_model_1 Phases=1 bus1=PSB.2 Kv=7.2 Kw=5100 Model=1 Kvar=2752.6884
New Generator.Gen_PSB.3_model_1 Phases=1 bus1=PSB.3 Kv=7.2 Kw=5100 Model=1 Kvar=2752.6884
New Generator.Gen_PSA.1_model_1 Phases=1 bus1=PSA.1 Kv=7.2 Kw=5100 Model=1 Kvar=2752.6884
New Generator.Gen_PSA.2_model_1 Phases=1 bus1=PSA.2 Kv=7.2 Kw=5100 Model=1 Kvar=2752.6884
New Generator.Gen_PSA.3_model_1 Phases=1 bus1=PSA.3 Kv=7.2 Kw=5100 Model=1 Kvar=2752.6884


! Let DSS estimate the voltage bases
Set voltagebases=[115 69 12.47 4.16 2.4 0.48 0.24 0.208 0.12]
Calcvoltagebases     ! This also establishes the bus list

!Buscoords OutputDSS_buscoords.csv

solve

set maxiterations=1000
